# OpenSim document version 40000
Model FullBodyModel_Gait120_Dataset:
  gravity: 0 -9.80665 0
  credits: Junyo Boo, Dongwook Seo, Minseung Kim, Seungbum Koo
  length_units: meters
  force_units: N
  publications:
    Boo, J. et al. "Comprehensive human locomotion and electromyography dataset: Gait120". Scientific Data, 12(1), 1023. (2025)
  Ground
  BodySet:
    Body pelvis: mass=11.25535 [kg] mass_center=(-0.06936832 0 0) inertia=(0.09458033 0.08013567 0.05327044 0 0 0)
        meshes=(r_pelvis.vtp l_pelvis.vtp sacrum.vtp)
      WrapCylinder Gmax1_at_pelvis_r: xyz_body_rotation=(-0.6 0.45 0) translation=(-0.07554966 -0.09713527 0.05985103)
          quadrant=-x radius=0.03924657 length=0.1471747
      WrapCylinder Gmax2_at_pelvis_r: xyz_body_rotation=(-0.75 0.39 0) translation=(-0.07849315 -0.08143664 0.06671918)
          quadrant=all radius=0.03924657 length=0.09811644
      WrapCylinder Gmax3_at_pelvis_r: xyz_body_rotation=(-0.1 0 0) translation=(-0.08143664 -0.08634246 0.06671918)
          quadrant=all radius=0.03924657 length=0.09811644
      WrapCylinder Gmax1_at_pelvis_l: xyz_body_rotation=(0.6 -0.45 0) translation=(-0.07554966 -0.09713527 -0.05985103)
          quadrant=-x radius=0.03924657 length=0.1471747
      WrapCylinder Gmax2_at_pelvis_l: xyz_body_rotation=(0.75 -0.39 0)
          translation=(-0.07849315 -0.08143664 -0.06671918) quadrant=all radius=0.03924657 length=0.09811644
      WrapCylinder Gmax3_at_pelvis_l: xyz_body_rotation=(0.1 0 0) translation=(-0.08143664 -0.08634246 -0.06671918)
          quadrant=all radius=0.03924657 length=0.09811644
      WrapCylinder PS_at_brim_r: xyz_body_rotation=(-0.25 -0.27 0.1) translation=(-0.07260616 -0.05886986 0.06436438)
          quadrant=-y radius=0.04905822 length=0.09811644
      WrapCylinder PS_at_brim_l: xyz_body_rotation=(0.25 0.27 0.1) translation=(-0.07260616 -0.05886986 -0.06436438)
          quadrant=-y radius=0.04905822 length=0.09811644
      WrapCylinder IL_at_brim_r: xyz_body_rotation=(-0.32 -0.24 0.9) translation=(-0.06966267 -0.06377568 0.07417603)
          quadrant=-y radius=0.05386592 length=0.09811644
      WrapCylinder IL_at_brim_l: xyz_body_rotation=(0.32 0.24 0.9) translation=(-0.06966267 -0.06377568 -0.07417603)
          quadrant=-y radius=0.05386592 length=0.09811644
    Body femur_r: mass=8.889401 mass_center=(0 -0.1588629 0) inertia=(0.1117512 0.02929399 0.1178436 0 0 0)
        meshes=r_femur.vtp
      WrapCylinder Gastroc_at_condyles_r: translation=(0.004672439 -0.38314 0) quadrant=all radius=0.0233622
          length=0.09344878
      WrapCylinder KnExt_at_fem_r: xyz_body_rotation=(-0.0623366 0.0507601 0)
          translation=(0.003353204 -0.3763482 0.001954117) quadrant=all radius=0.0233622 length=0.09344878
      WrapCylinder AB_at_femshaft_r: xyz_body_rotation=(1.66157 0.186644 0)
          translation=(0.01368408 -0.1052187 0.02183431) quadrant=all radius=0.01541905 length=0.06541415
      WrapCylinder AL_at_femshaft_r: xyz_body_rotation=(1.77711 0.136489 0)
          translation=(0.02871933 -0.2167161 0.01412357) quadrant=all radius=0.01878321 length=0.09344878
      WrapCylinder AMprox_at_femshaft_r: xyz_body_rotation=(1.61126 0.18656 0)
          translation=(0.004843441 -0.0681193 0.02373879) quadrant=all radius=0.01971769 length=0.06541415
      WrapCylinder AMmid_at_femshaft_r: xyz_body_rotation=(1.61139 0.13656 0)
          translation=(0.0215049 -0.1501825 0.01923568) quadrant=all radius=0.01999804 length=0.1121385
      WrapCylinder AMdist_at_femshaft_r: xyz_body_rotation=(1.71188 0.186636 0)
          translation=(0.02953589 -0.2436546 0.008751105) quadrant=all radius=0.02037183 length=0.1868976
      WrapCylinder AMisch_at_condyles_r: xyz_body_rotation=(1.71115 -0.463363 0)
          translation=(-0.02116718 -0.352144 -0.00294772) quadrant=all radius=0.03737951 length=0.2242771
      WrapCylinder PECT_at_femshaft_r: xyz_body_rotation=(1.81295 0.276344 0)
          translation=(0.005687041 -0.07896693 0.02844628) quadrant=all radius=0.01401732 length=0.04672439
    Body tibia_r: mass=3.543279 mass_center=(0 -0.1762996 0) inertia=(0.04295054 0.004346186 0.04354708 0 0 0)
        meshes=(r_tibia.vtp r_fibula.vtp)
      WrapCylinder GasLat_at_shank_r: xyz_body_rotation=(2.96723 -0.279725 -1.47812)
          translation=(-0.006987771 -0.06987771 -0.003116168) quadrant=-y radius=0.05193614 length=0.09442934
      WrapCylinder GasMed_at_shank_r: xyz_body_rotation=(2.96723 0.0279725 -1.47812)
          translation=(-0.006987771 -0.06987771 -0.003116168) quadrant=-y radius=0.05193614 length=0.09442934
      WrapCylinder GR_at_condyles_r: xyz_body_rotation=(0 -0.4 0) translation=(-0.00283288 -0.01888587 0) quadrant=all
          radius=0.03399456 length=0.09442934
      WrapCylinder SM_at_condyles_r: xyz_body_rotation=(0 -0.1 0) translation=(-0.0009442934 -0.01888587 0)
          quadrant=all radius=0.03323913 length=0.09442934
      WrapCylinder ST_at_condyles_r: xyz_body_rotation=(0 -0.2 0) translation=(-0.001888587 -0.01935802 0) quadrant=all
          radius=0.04013247 length=0.09442934
      WrapCylinder BF_at_gastroc_r: translation=(-0.05476902 -0.05665761 0) quadrant=y radius=0.0283288 length=0.141644
    Body patella_r: mass=0.08238183 mass_center=(0.0018 0.0264 0) inertia=(2.742875e-6 1.25293e-5 1.25293e-5 0 0 0)
        meshes=r_patella.vtp
    Body talus_r: mass=0.09557057 mass_center=(0 0 0) inertia=(0.0006401579 0.0006401579 0.0006401579 0 0 0)
        meshes=r_talus.vtp
    Body calcn_r: mass=1.194632 mass_center=(0.08184299 0.0245529 0)
        inertia=(0.0008962211 0.002496616 0.002624648 0 0 0) meshes=r_foot.vtp
    Body toes_r: mass=0.2070059 mass_center=(0.02831767 0.004910579 -0.01432252)
        inertia=(6.401579e-5 0.0001280316 0.0006401579 0 0 0) meshes=r_bofoot.vtp
    Body femur_l: mass=8.889401 mass_center=(0 -0.1588629 0) inertia=(0.1117512 0.02929399 0.1178436 0 0 0)
        meshes=l_femur.vtp
      WrapCylinder Gastroc_at_condyles_l: translation=(0.004672439 -0.38314 0) quadrant=all radius=0.0233622
          length=0.09344878
      WrapCylinder KnExt_at_fem_l: xyz_body_rotation=(0.0623366 -0.0507601 0)
          translation=(0.003353204 -0.3763482 -0.001954117) quadrant=all radius=0.0233622 length=0.09344878
      WrapCylinder AB_at_femshaft_l: xyz_body_rotation=(-1.66157 -0.186644 0)
          translation=(0.01368408 -0.1052187 -0.02183431) quadrant=all radius=0.01541905 length=0.06541415
      WrapCylinder AL_at_femshaft_l: xyz_body_rotation=(-1.77711 -0.136489 0)
          translation=(0.02871933 -0.2167161 -0.01412357) quadrant=all radius=0.01878321 length=0.09344878
      WrapCylinder AMprox_at_femshaft_l: xyz_body_rotation=(-1.61126 -0.18656 0)
          translation=(0.004843441 -0.0681193 -0.02373879) quadrant=all radius=0.01971769 length=0.06541415
      WrapCylinder AMmid_at_femshaft_l: xyz_body_rotation=(-1.61139 -0.13656 0)
          translation=(0.0215049 -0.1501825 -0.01923568) quadrant=all radius=0.01999804 length=0.1121385
      WrapCylinder AMdist_at_femshaft_l: xyz_body_rotation=(-1.71188 -0.186636 0)
          translation=(0.02953589 -0.2436546 -0.008751105) quadrant=all radius=0.02037183 length=0.1868976
      WrapCylinder AMisch_at_condyles_l: xyz_body_rotation=(-1.71115 0.463363 0)
          translation=(-0.02116718 -0.352144 0.00294772) quadrant=all radius=0.03737951 length=0.2242771
      WrapCylinder PECT_at_femshaft_l: xyz_body_rotation=(-1.81295 -0.276344 0)
          translation=(0.005687041 -0.07896693 -0.02844628) quadrant=all radius=0.01401732 length=0.04672439
    Body tibia_l: mass=3.543279 mass_center=(0 -0.1762996 0) inertia=(0.04295054 0.004346186 0.04354708 0 0 0)
        meshes=(l_tibia.vtp l_fibula.vtp)
      WrapCylinder GasLat_at_shank_l: xyz_body_rotation=(-2.96723 0.279725 -1.47812)
          translation=(-0.006987771 -0.06987771 0.003116168) quadrant=-y radius=0.05193614 length=0.09442934
      WrapCylinder GasMed_at_shank_l: xyz_body_rotation=(-2.96723 -0.0279725 -1.47812)
          translation=(-0.006987771 -0.06987771 0.003116168) quadrant=-y radius=0.05193614 length=0.09442934
      WrapCylinder GR_at_condyles_l: xyz_body_rotation=(0 0.4 0) translation=(-0.00283288 -0.01888587 0) quadrant=all
          radius=0.03399456 length=0.09442934
      WrapCylinder SM_at_condyles_l: xyz_body_rotation=(0 0.1 0) translation=(-0.0009442934 -0.01888587 0) quadrant=all
          radius=0.03323913 length=0.09442934
      WrapCylinder ST_at_condyles_l: xyz_body_rotation=(0 0.2 0) translation=(-0.001888587 -0.01935802 0) quadrant=all
          radius=0.04013247 length=0.09442934
      WrapCylinder BF_at_gastroc_l: translation=(-0.05476902 -0.05665761 0) quadrant=all radius=0.0283288
          length=0.141644
    Body patella_l: mass=0.08238183 mass_center=(0.0018 0.0264 0) inertia=(2.742875e-6 1.25293e-5 1.25293e-5 0 0 0)
        meshes=l_patella.vtp
    Body talus_l: mass=0.09557057 mass_center=(0 0 0) inertia=(0.0006401579 0.0006401579 0.0006401579 0 0 0)
        meshes=l_talus.vtp
    Body calcn_l: mass=1.194632 mass_center=(0.08184299 0.0245529 0)
        inertia=(0.0008962211 0.002496616 0.002624648 0 0 0) meshes=l_foot.vtp
    Body toes_l: mass=0.2070059 mass_center=(0.02831767 0.004910579 0.01432252)
        inertia=(6.401579e-5 0.0001280316 0.0006401579 0 0 0) meshes=l_bofoot.vtp
    Body torso: mass=25.63833 mass_center=(-0.02879739 0.3071722 0) inertia=(1.298473 0.6653076 1.260518 0 0 0)
        meshes=(hat_spine.vtp hat_jaw.vtp hat_skull.vtp hat_ribs_scap.vtp)
    Body humerus_r: mass=1.942472 mass_center=(0 -0.1501613 0) inertia=(0.009513068 0.003281714 0.01067811 0 0 0)
        meshes=humerus_rv.vtp
    Body ulna_r: mass=0.5805912 mass_center=(0 -0.1203075 0) inertia=(0.002820595 0.0005884968 0.003059612 0 0 0)
        meshes=ulna_rv.vtp
    Body radius_r: mass=0.5805912 mass_center=(0 -0.1203075 0) inertia=(0.002820595 0.0005884968 0.003059612 0 0 0)
        meshes=radius_rv.vtp
    Body hand_r: mass=0.4372354 mass_center=(0 -0.06897298 0) inertia=(0.0008746143 0.0005363386 0.001313882 0 0 0)
        meshes=(pisiform_rvs.vtp lunate_rvs.vtp scaphoid_rvs.vtp triquetrum_rvs.vtp hamate_rvs.vtp capitate_rvs.vtp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)
    Body humerus_l: mass=1.942472 mass_center=(0 -0.1501613 0) inertia=(0.009513068 0.003281714 0.01067811 0 0 0)
        meshes=humerus_lv.vtp
    Body ulna_l: mass=0.5805912 mass_center=(0 -0.1203075 0) inertia=(0.002820595 0.0005884968 0.003059612 0 0 0)
        meshes=ulna_lv.vtp
    Body radius_l: mass=0.5805912 mass_center=(0 -0.1203075 0) inertia=(0.002820595 0.0005884968 0.003059612 0 0 0)
        meshes=radius_lv.vtp
    Body hand_l: mass=0.4372354 mass_center=(0 -0.06897298 0) inertia=(0.0008746143 0.0005363386 0.001313882 0 0 0)
        meshes=(pisiform_lvs.vtp lunate_lvs.vtp scaphoid_lvs.vtp triquetrum_lvs.vtp hamate_lvs.vtp capitate_lvs.vtp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)
  JointSet:
    CustomJoint ground_pelvis: socket_parent_frame=ground_offset socket_child_frame=pelvis_offset
      Coordinate pelvis_tilt: default_value=0 range=(-1.570796 1.570796) clamped=true
      Coordinate pelvis_list: default_value=0 range=(-1.570796 1.570796) clamped=true
      Coordinate pelvis_rotation: default_value=0 range=(-1.570796 1.570796) clamped=true
      Coordinate pelvis_tx: default_value=0 range=(-5 5) clamped=true
      Coordinate pelvis_ty: default_value=0.94 range=(-1 2) clamped=true
      Coordinate pelvis_tz: default_value=0 range=(-3 3) clamped=true
      PhysicalOffsetFrame ground_offset: socket_parent=/ground translation=(0 0 0) [meters]
      PhysicalOffsetFrame pelvis_offset: socket_parent=/bodyset/pelvis translation=(0 0 0)
      SpatialTransform:
        TransformAxis rotation1: coordinates=pelvis_tilt axis=(0 0 1) LinearFunction(coefficients=1 0)
        TransformAxis rotation2: coordinates=pelvis_list axis=(1 0 0) LinearFunction(coefficients=1 0)
        TransformAxis rotation3: coordinates=pelvis_rotation axis=(0 1 0) LinearFunction(coefficients=1 0)
        TransformAxis translation1: coordinates=pelvis_tx axis=(1 0 0) LinearFunction(coefficients=1 0)
        TransformAxis translation2: coordinates=pelvis_ty axis=(0 1 0) LinearFunction(coefficients=1 0)
        TransformAxis translation3: coordinates=pelvis_tz axis=(0 0 1) LinearFunction(coefficients=1 0)
    CustomJoint hip_r: socket_parent_frame=pelvis_offset socket_child_frame=femur_r_offset
      Coordinate hip_flexion_r: default_value=0 range=(-0.5235988 2.094395) clamped=true
      Coordinate hip_adduction_r: default_value=0 range=(-0.8726646 0.5235988) clamped=true
      Coordinate hip_rotation_r: default_value=0 range=(-0.6981317 0.6981317) clamped=true
      PhysicalOffsetFrame pelvis_offset: socket_parent=/bodyset/pelvis translation=(-0.05521601 -0.07701159 0.07580476)
      PhysicalOffsetFrame femur_r_offset: socket_parent=/bodyset/femur_r translation=(0 0 0)
      SpatialTransform: axes_held_at_zero=(translation1 translation2 translation3)
        TransformAxis rotation1: coordinates=hip_flexion_r axis=(0 0 1) LinearFunction(coefficients=1 0)
        TransformAxis rotation2: coordinates=hip_adduction_r axis=(1 0 0) LinearFunction(coefficients=1 0)
        TransformAxis rotation3: coordinates=hip_rotation_r axis=(0 1 0) LinearFunction(coefficients=1 0)
    CustomJoint walker_knee_r: socket_parent_frame=femur_r_offset socket_child_frame=tibia_r_offset
      Coordinate knee_angle_r: default_value=0 range=(-2.0944 0) clamped=true
      PhysicalOffsetFrame femur_r_offset: socket_parent=/bodyset/femur_r
          translation=(-4.298644e-7 -0.3779304 -0.00118237)
      PhysicalOffsetFrame tibia_r_offset: socket_parent=/bodyset/tibia_r translation=(0 0 0)
      SpatialTransform: axes_held_at_zero=(rotation2 rotation3 translation1 translation2 translation3)
        TransformAxis rotation1: coordinates=knee_angle_r axis=(0 0 1) LinearFunction(coefficients=1 0)
    CustomJoint patellofemoral_r: socket_parent_frame=femur_r_offset socket_child_frame=patella_r_offset
      Coordinate knee_angle_r_beta: default_value=0 range=(-99999.9 99999.9) clamped=false locked=true
      PhysicalOffsetFrame femur_r_offset: socket_parent=/bodyset/femur_r
          translation=(-0.007560007 -0.3812337 -0.002569842)
      PhysicalOffsetFrame patella_r_offset: socket_parent=/bodyset/patella_r translation=(0 0 0)
      SpatialTransform: axes_held_at_zero=(rotation2 rotation3)
        TransformAxis rotation1: coordinates=knee_angle_r_beta axis=(0 0 1)
          SimmSpline: x=(0 0.174533 0.349066 0.523599 0.698132 0.872665 1.0472 1.22173 1.39626 1.5708 1.74533 1.91986 2.0944)
              y=(0.00113686 -0.00629212 -0.105582 -0.253683 -0.414245 -0.579047 -0.747244 -0.91799 -1.09044 -1.26379 -1.43763 -1.61186 -1.78634)
        TransformAxis translation1: coordinates=knee_angle_r_beta axis=(1 0 0)
          MultiplierFunction: scale=0.9344878
            SimmSpline: x=(0 0.174533 0.349066 0.523599 0.698132 0.872665 1.0472 1.22173 1.39626 1.5708 1.74533 1.91986 2.0944)
                y=(0.0524 0.0488 0.0437 0.0371 0.0296 0.0216 0.0136 0.0057 -0.0019 -0.0088 -0.0148 -0.0196 -0.0227)
        TransformAxis translation2: coordinates=knee_angle_r_beta axis=(0 1 0)
          MultiplierFunction: scale=0.9344878
            SimmSpline: x=(0 0.174533 0.349066 0.523599 0.698132 0.872665 1.0472 1.22173 1.39626 1.5708 1.74533 1.91986 2.0944)
                y=(-0.0108 -0.019 -0.0263 -0.0322 -0.0367 -0.0395 -0.0408 -0.0404 -0.0384 -0.0349 -0.0301 -0.0245 -0.0187)
        TransformAxis translation3: axis=(0 0 1) MultiplierFunction(scale=0.9344878, Constant(value=0.00275))
    PinJoint ankle_r: socket_parent_frame=tibia_r_offset socket_child_frame=talus_r_offset
      Coordinate ankle_angle_r: default_value=0 range=(-0.6981317 0.5235988) clamped=true
      PhysicalOffsetFrame tibia_r_offset: socket_parent=/bodyset/tibia_r translation=(-0.009442934 -0.3777174 0)
          orientation=(0.175895 -0.105208 0.0186622) [radians]
      PhysicalOffsetFrame talus_r_offset: socket_parent=/bodyset/talus_r translation=(0 0 0)
          orientation=(0.175895 -0.105208 0.0186622)
    PinJoint subtalar_r: socket_parent_frame=talus_r_offset socket_child_frame=calcn_r_offset
      Coordinate subtalar_angle_r: default_value=0 range=(-0.3490659 0.3490659) clamped=true
      PhysicalOffsetFrame talus_r_offset: socket_parent=/bodyset/talus_r
          translation=(-0.03991483 -0.03433313 0.006481965) orientation=(-1.76819 0.906223 1.8196)
      PhysicalOffsetFrame calcn_r_offset: socket_parent=/bodyset/calcn_r translation=(0 0 0)
          orientation=(-1.76819 0.906223 1.8196)
    PinJoint mtp_r: socket_parent_frame=calcn_r_offset socket_child_frame=toes_r_offset
      Coordinate mtp_angle_r: default_value=0 range=(-0.5235988 0.5235988) clamped=true
      PhysicalOffsetFrame calcn_r_offset: socket_parent=/bodyset/calcn_r
          translation=(0.1463353 -0.00163686 0.0008839043) orientation=(-3.14159 0.619901 0)
      PhysicalOffsetFrame toes_r_offset: socket_parent=/bodyset/toes_r translation=(0 0 0)
          orientation=(-3.14159 0.619901 0)
    CustomJoint hip_l: socket_parent_frame=pelvis_offset socket_child_frame=femur_l_offset
      Coordinate hip_flexion_l: default_value=0 range=(-0.5235988 2.094395) clamped=true
      Coordinate hip_adduction_l: default_value=0 range=(-0.8726646 0.5235988) clamped=true
      Coordinate hip_rotation_l: default_value=0 range=(-0.6981317 0.6981317) clamped=true
      PhysicalOffsetFrame pelvis_offset: socket_parent=/bodyset/pelvis
          translation=(-0.05521601 -0.07701159 -0.07580476)
      PhysicalOffsetFrame femur_l_offset: socket_parent=/bodyset/femur_l translation=(0 0 0)
      SpatialTransform: axes_held_at_zero=(translation1 translation2 translation3)
        TransformAxis rotation1: coordinates=hip_flexion_l axis=(0 0 1) LinearFunction(coefficients=1 0)
        TransformAxis rotation2: coordinates=hip_adduction_l axis=(1 0 0) LinearFunction(coefficients=1 0)
        TransformAxis rotation3: coordinates=hip_rotation_l axis=(0 1 0) LinearFunction(coefficients=1 0)
    CustomJoint walker_knee_l: socket_parent_frame=femur_l_offset socket_child_frame=tibia_l_offset
      Coordinate knee_angle_l: default_value=0 range=(-2.0944 0) clamped=true
      PhysicalOffsetFrame femur_l_offset: socket_parent=/bodyset/femur_l
          translation=(-4.298644e-7 -0.3779304 0.00118237)
      PhysicalOffsetFrame tibia_l_offset: socket_parent=/bodyset/tibia_l translation=(0 0 0)
      SpatialTransform: axes_held_at_zero=(rotation2 rotation3 translation1 translation2 translation3)
        TransformAxis rotation1: coordinates=knee_angle_l axis=(0 0 1) LinearFunction(coefficients=1 0)
    CustomJoint patellofemoral_l: socket_parent_frame=femur_l_offset socket_child_frame=patella_l_offset
      Coordinate knee_angle_l_beta: default_value=0 range=(-99999.9 99999.9) clamped=false locked=true
      PhysicalOffsetFrame femur_l_offset: socket_parent=/bodyset/femur_l
          translation=(-0.007560007 -0.3812337 0.002569842)
      PhysicalOffsetFrame patella_l_offset: socket_parent=/bodyset/patella_l translation=(0 0 0)
      SpatialTransform: axes_held_at_zero=(rotation2 rotation3)
        TransformAxis rotation1: coordinates=knee_angle_l_beta axis=(0 0 1)
          SimmSpline: x=(0 0.174533 0.349066 0.523599 0.698132 0.872665 1.0472 1.22173 1.39626 1.5708 1.74533 1.91986 2.0944)
              y=(0.00113686 -0.00629212 -0.105582 -0.253683 -0.414245 -0.579047 -0.747244 -0.91799 -1.09044 -1.26379 -1.43763 -1.61186 -1.78634)
        TransformAxis translation1: coordinates=knee_angle_l_beta axis=(1 0 0)
          MultiplierFunction: scale=0.9344878
            SimmSpline: x=(0 0.174533 0.349066 0.523599 0.698132 0.872665 1.0472 1.22173 1.39626 1.5708 1.74533 1.91986 2.0944)
                y=(0.0524 0.0488 0.0437 0.0371 0.0296 0.0216 0.0136 0.0057 -0.0019 -0.0088 -0.0148 -0.0196 -0.0227)
        TransformAxis translation2: coordinates=knee_angle_l_beta axis=(0 1 0)
          MultiplierFunction: scale=0.9344878
            SimmSpline: x=(0 0.174533 0.349066 0.523599 0.698132 0.872665 1.0472 1.22173 1.39626 1.5708 1.74533 1.91986 2.0944)
                y=(-0.0108 -0.019 -0.0263 -0.0322 -0.0367 -0.0395 -0.0408 -0.0404 -0.0384 -0.0349 -0.0301 -0.0245 -0.0187)
        TransformAxis translation3: axis=(0 0 1) MultiplierFunction(scale=0.9344878, Constant(value=-0.00275))
    PinJoint ankle_l: socket_parent_frame=tibia_l_offset socket_child_frame=talus_l_offset
      Coordinate ankle_angle_l: default_value=0 range=(-0.6981317 0.5235988) clamped=true
      PhysicalOffsetFrame tibia_l_offset: socket_parent=/bodyset/tibia_l translation=(-0.009442934 -0.3777174 0)
          orientation=(-0.175895 0.105208 0.0186622)
      PhysicalOffsetFrame talus_l_offset: socket_parent=/bodyset/talus_l translation=(0 0 0)
          orientation=(-0.175895 0.105208 0.0186622)
    PinJoint subtalar_l: socket_parent_frame=talus_l_offset socket_child_frame=calcn_l_offset
      Coordinate subtalar_angle_l: default_value=0 range=(-0.3490659 0.3490659) clamped=true
      PhysicalOffsetFrame talus_l_offset: socket_parent=/bodyset/talus_l
          translation=(-0.03991483 -0.03433313 -0.006481965) orientation=(1.76819 -0.906223 1.8196)
      PhysicalOffsetFrame calcn_l_offset: socket_parent=/bodyset/calcn_l translation=(0 0 0)
          orientation=(1.76819 -0.906223 1.8196)
    PinJoint mtp_l: socket_parent_frame=calcn_l_offset socket_child_frame=toes_l_offset
      Coordinate mtp_angle_l: default_value=0 range=(-0.5235988 0.5235988) clamped=true
      PhysicalOffsetFrame calcn_l_offset: socket_parent=/bodyset/calcn_l
          translation=(0.1463353 -0.00163686 -0.0008839043) orientation=(-3.14159 -0.619901 0)
      PhysicalOffsetFrame toes_l_offset: socket_parent=/bodyset/toes_l translation=(0 0 0)
          orientation=(-3.14159 -0.619901 0)
    CustomJoint back: socket_parent_frame=pelvis_offset socket_child_frame=torso_offset
      Coordinate lumbar_extension: default_value=0 range=(-1.570796 1.570796) clamped=true
      Coordinate lumbar_bending: default_value=0 range=(-1.570796 1.570796) clamped=true
      Coordinate lumbar_rotation: default_value=0 range=(-1.570796 1.570796) clamped=true
      PhysicalOffsetFrame pelvis_offset: socket_parent=/bodyset/pelvis translation=(-0.09880325 0.0799649 0)
      PhysicalOffsetFrame torso_offset: socket_parent=/bodyset/torso translation=(0 0 0)
      SpatialTransform: axes_held_at_zero=(translation1 translation2 translation3)
        TransformAxis rotation1: coordinates=lumbar_extension axis=(0 0 1) LinearFunction(coefficients=1 0)
        TransformAxis rotation2: coordinates=lumbar_bending axis=(1 0 0) LinearFunction(coefficients=1 0)
        TransformAxis rotation3: coordinates=lumbar_rotation axis=(0 1 0) LinearFunction(coefficients=1 0)
    CustomJoint acromial_r: socket_parent_frame=torso_offset socket_child_frame=humerus_r_offset
      Coordinate arm_flex_r: default_value=0 range=(-1.570796 1.570796) clamped=true
      Coordinate arm_add_r: default_value=0 range=(-2.094395 1.570796) clamped=true
      Coordinate arm_rot_r: default_value=0 range=(-1.570796 1.570796) clamped=true
      PhysicalOffsetFrame torso_offset: socket_parent=/bodyset/torso translation=(0.003028526 0.3566077 0.1631852)
      PhysicalOffsetFrame humerus_r_offset: socket_parent=/bodyset/humerus_r translation=(0 0 0)
      SpatialTransform: axes_held_at_zero=(translation1 translation2 translation3)
        TransformAxis rotation1: coordinates=arm_flex_r axis=(0 0 1) LinearFunction(coefficients=1 0)
        TransformAxis rotation2: coordinates=arm_add_r axis=(1 0 0) LinearFunction(coefficients=1 0)
        TransformAxis rotation3: coordinates=arm_rot_r axis=(0 1 0) LinearFunction(coefficients=1 0)
    PinJoint elbow_r: socket_parent_frame=humerus_r_offset socket_child_frame=ulna_r_offset
      Coordinate elbow_flex_r: default_value=0 range=(0 2.618) clamped=true
      PhysicalOffsetFrame humerus_r_offset: socket_parent=/bodyset/humerus_r
          translation=(0.01199816 -0.2613168 -0.008758544) orientation=(-0.0228627 0.228018 0.0051689)
      PhysicalOffsetFrame ulna_r_offset: socket_parent=/bodyset/ulna_r translation=(0 0 0)
          orientation=(-0.0228627 0.228018 0.0051689)
    PinJoint radioulnar_r: socket_parent_frame=ulna_r_offset socket_child_frame=radius_r_offset
      Coordinate pro_sup_r: default_value=1.57 range=(0 1.570796) clamped=true locked=true
      PhysicalOffsetFrame ulna_r_offset: socket_parent=/bodyset/ulna_r
          translation=(-0.006714863 -0.01298353 0.02603594) orientation=(-1.56884 0.056428 1.53614)
      PhysicalOffsetFrame radius_r_offset: socket_parent=/bodyset/radius_r translation=(0 0 0)
          orientation=(-1.56884 0.056428 1.53614)
    UniversalJoint radius_hand_r: socket_parent_frame=radius_r_offset socket_child_frame=hand_r_offset
      Coordinate wrist_flex_r: default_value=0 range=(-1.22173 1.22173) clamped=true locked=true
      Coordinate wrist_dev_r: default_value=0 range=(-0.4363323 0.6108652) clamped=true locked=true
      PhysicalOffsetFrame radius_r_offset: socket_parent=/bodyset/radius_r
          translation=(-0.008781128 -0.2354155 0.01358544) orientation=(-1.5708 0 -1.5708)
      PhysicalOffsetFrame hand_r_offset: socket_parent=/bodyset/hand_r translation=(0 0 0)
          orientation=(-1.5708 0 -1.5708)
    CustomJoint acromial_l: socket_parent_frame=torso_offset socket_child_frame=humerus_l_offset
      Coordinate arm_flex_l: default_value=0 range=(-1.570796 1.570796) clamped=true
      Coordinate arm_add_l: default_value=0 range=(-2.094395 1.570796) clamped=true
      Coordinate arm_rot_l: default_value=0 range=(-1.570796 1.570796) clamped=true
      PhysicalOffsetFrame torso_offset: socket_parent=/bodyset/torso translation=(0.003028526 0.3566077 -0.1631852)
      PhysicalOffsetFrame humerus_l_offset: socket_parent=/bodyset/humerus_l translation=(0 0 0)
      SpatialTransform: axes_held_at_zero=(translation1 translation2 translation3)
        TransformAxis rotation1: coordinates=arm_flex_l axis=(0 0 1) LinearFunction(coefficients=1 0)
        TransformAxis rotation2: coordinates=arm_add_l axis=(1 0 0) LinearFunction(coefficients=1 0)
        TransformAxis rotation3: coordinates=arm_rot_l axis=(0 1 0) LinearFunction(coefficients=1 0)
    PinJoint elbow_l: socket_parent_frame=humerus_l_offset socket_child_frame=ulna_l_offset
      Coordinate elbow_flex_l: default_value=0 range=(0 2.618) clamped=true
      PhysicalOffsetFrame humerus_l_offset: socket_parent=/bodyset/humerus_l
          translation=(0.01199816 -0.2613168 0.008758544) orientation=(0.0228627 -0.228018 0.0051689)
      PhysicalOffsetFrame ulna_l_offset: socket_parent=/bodyset/ulna_l translation=(0 0 0)
          orientation=(0.0228627 -0.228018 0.0051689)
    PinJoint radioulnar_l: socket_parent_frame=ulna_l_offset socket_child_frame=radius_l_offset
      Coordinate pro_sup_l: default_value=1.57 range=(0 1.570796) clamped=true locked=true
      PhysicalOffsetFrame ulna_l_offset: socket_parent=/bodyset/ulna_l
          translation=(-0.006714863 -0.01298353 -0.02603594) orientation=(1.56884 -0.056428 1.53614)
      PhysicalOffsetFrame radius_l_offset: socket_parent=/bodyset/radius_l translation=(0 0 0)
          orientation=(1.56884 -0.056428 1.53614)
    UniversalJoint radius_hand_l: socket_parent_frame=radius_l_offset socket_child_frame=hand_l_offset
      Coordinate wrist_flex_l: default_value=0 range=(-1.22173 1.22173) clamped=true locked=true
      Coordinate wrist_dev_l: default_value=0 range=(-0.4363323 0.6108652) clamped=true locked=true
      PhysicalOffsetFrame radius_l_offset: socket_parent=/bodyset/radius_l
          translation=(-0.008781128 -0.2354155 -0.01358544) orientation=(1.5708 0 1.5708)
      PhysicalOffsetFrame hand_l_offset: socket_parent=/bodyset/hand_l translation=(0 0 0)
          orientation=(1.5708 0 1.5708)
  ConstraintSet:
    CoordinateCouplerConstraint patellofemoral_knee_angle_r_con: isEnforced=false
        independent_coordinate_names=knee_angle_r dependent_coordinate_name=knee_angle_r_beta scale_factor=1
        coupled_coordinates_function=LinearFunction(coefficients=1 0)
    CoordinateCouplerConstraint patellofemoral_knee_angle_l_con: isEnforced=false
        independent_coordinate_names=knee_angle_l dependent_coordinate_name=knee_angle_l_beta scale_factor=1
        coupled_coordinates_function=LinearFunction(coefficients=1 0)
  ForceSet:
    Thelen2003Muscle [values shared by the 92 below unless stated]: optimal_force=1 max_contraction_velocity=10
        FmaxTendonStrain=0.033 FmaxMuscleStrain=0.6 KshapeActive=0.5 KshapePassive=4 Af=0.3 Flen=1.8
        activation_time_constant=0.01 [seconds] deactivation_time_constant=0.04 [seconds]
    Thelen2003Muscle glut_med1_r: max_isometric_force=819 optimal_fiber_length=0.05205638
        tendon_slack_length=0.07589528 pennation_angle_at_optimal=0.1396263 [radians]
      PathPoint P1: pelvis (-0.04003151 0.0298274 0.1186228)
      PathPoint P2: femur_r (-0.02037183 -0.01093351 0.05186408)
    Thelen2003Muscle glut_med2_r: max_isometric_force=573 optimal_fiber_length=0.08221833 tendon_slack_length=0.0515689
        pennation_angle_at_optimal=0
      PathPoint P1: pelvis (-0.08388955 0.04366181 0.07515719)
      PathPoint P2: femur_r (-0.02410979 -0.005420029 0.04924751)
    Thelen2003Muscle glut_med3_r: max_isometric_force=653 optimal_fiber_length=0.06282709
        tendon_slack_length=0.05154545 pennation_angle_at_optimal=0.3316126
      PathPoint P1: pelvis (-0.1199964 0.01030223 0.06357945)
      PathPoint P2: femur_r (-0.02887567 -0.004392093 0.04840647)
    Thelen2003Muscle glut_min1_r: max_isometric_force=270 optimal_fiber_length=0.06569399
        tendon_slack_length=0.01545741 pennation_angle_at_optimal=0.1745329
      PathPoint P1: pelvis (-0.04582038 -0.007849315 0.103611)
      PathPoint P2: femur_r (-0.006728312 -0.009718674 0.05233132)
    Thelen2003Muscle glut_min2_r: max_isometric_force=285 optimal_fiber_length=0.05404643
        tendon_slack_length=0.02509299 pennation_angle_at_optimal=0
      PathPoint P1: pelvis (-0.0621077 -0.006377568 0.09723339)
      PathPoint P2: femur_r (-0.008971083 -0.009718674 0.05233132)
    Thelen2003Muscle glut_min3_r: max_isometric_force=323 optimal_fiber_length=0.03668307
        tendon_slack_length=0.04923254 pennation_angle_at_optimal=0.01745329
      PathPoint P1: pelvis (-0.08182911 -0.006181336 0.08398767)
      PathPoint P2: femur_r (-0.01261559 -0.007756249 0.05139683)
    Thelen2003Muscle semimem_r: max_isometric_force=1288 optimal_fiber_length=0.07471953 tendon_slack_length=0.3353039
        pennation_angle_at_optimal=0.2617994
      PathPoint P1: pelvis (-0.1169548 -0.09563409 0.07016306)
      ConditionalPathPoint P2: tibia_r (-0.03286141 -0.03322969 -0.01785659)
          socket_coordinate=/jointset/walker_knee_r/knee_angle_r range=(-0.558505 0.174533) [radians]
      PathPoint P3: tibia_r (-0.02549592 -0.04505224 -0.01847982)
    Thelen2003Muscle semiten_r: max_isometric_force=410 optimal_fiber_length=0.1877608 tendon_slack_length=0.2386711
        pennation_angle_at_optimal=0.08726646
      PathPoint P1: pelvis (-0.1239701 -0.1078103 0.05925252)
      ConditionalPathPoint P2: tibia_r (-0.03968865 -0.02699735 -0.02150156)
          socket_coordinate=/jointset/walker_knee_r/knee_angle_r range=(-0.331613 0.174533)
      PathPoint P3: tibia_r (-0.03136943 -0.04987758 -0.02160543)
      PathPoint P4: tibia_r (-0.01067052 -0.07044429 -0.02313519)
      PathPoint P5: tibia_r (0.002549592 -0.09027445 -0.01822486)
    Thelen2003Muscle bifemlh_r: max_isometric_force=896 optimal_fiber_length=0.1018092 tendon_slack_length=0.3044935
        pennation_angle_at_optimal=0
      PathPoint P1: pelvis (-0.1235875 -0.100638 0.06813205)
      PathPoint P2: tibia_r (-0.02842323 -0.03399456 0.02779056)
      PathPoint P3: tibia_r (-0.02209647 -0.05316372 0.03238926)
    Thelen2003Muscle bifemsh_r: max_isometric_force=804 optimal_fiber_length=0.1620851 tendon_slack_length=0.08338484
        pennation_angle_at_optimal=0.4014257
      PathPoint P1: femur_r (0.004672439 -0.1972704 0.02186702)
      PathPoint P2: tibia_r (-0.02842323 -0.03399456 0.02779056)
      PathPoint P3: tibia_r (-0.02209647 -0.05316372 0.03238926)
    Thelen2003Muscle sar_r: max_isometric_force=156 optimal_fiber_length=0.4904233 tendon_slack_length=0.09431218
        pennation_angle_at_optimal=0
      PathPoint P1: pelvis (-0.01501181 -0.001275514 0.1218606)
      PathPoint P2: femur_r (-0.002803464 -0.3334253 -0.03934194)
      PathPoint P3: tibia_r (-0.005288043 -0.03956589 -0.03767731)
      PathPoint P4: tibia_r (0.005665761 -0.05561888 -0.03616644)
      PathPoint P5: tibia_r (0.02294633 -0.07932065 -0.02379619)
    Thelen2003Muscle add_long_r: max_isometric_force=627 optimal_fiber_length=0.129552 tendon_slack_length=0.103266
        pennation_angle_at_optimal=0.1047198
      PathPoint P1: pelvis (-0.03100479 -0.08202534 0.01658168)
      PathPoint P2: femur_r (0.004672439 -0.1972704 0.02186702)
    Thelen2003Muscle add_brev_r: max_isometric_force=429 optimal_fiber_length=0.1256192 tendon_slack_length=0.0188901
        pennation_angle_at_optimal=0
      PathPoint P1: pelvis (-0.05759435 -0.08977654 0.0160911)
      PathPoint P2: femur_r (0.0008410391 -0.1117647 0.02747394)
    Thelen2003Muscle add_mag1_r: max_isometric_force=381 optimal_fiber_length=0.08174328 tendon_slack_length=0.05637467
        pennation_angle_at_optimal=0.08726646
      PathPoint P1: pelvis (-0.07182123 -0.1151887 0.02501969)
      PathPoint P2: femur_r (-0.004205195 -0.1131665 0.03167914)
    Thelen2003Muscle add_mag2_r: max_isometric_force=343 optimal_fiber_length=0.1125972 tendon_slack_length=0.1116667
        pennation_angle_at_optimal=0.05235988
      PathPoint P1: pelvis (-0.08153476 -0.1169548 0.03021986)
      PathPoint P2: femur_r (0.005046234 -0.2135305 0.02121287)
    Thelen2003Muscle add_mag3_r: max_isometric_force=488 optimal_fiber_length=0.1219847 tendon_slack_length=0.231864
        pennation_angle_at_optimal=0.08726646
      PathPoint P1: pelvis (-0.1089877 -0.1119803 0.04790044)
      PathPoint P2: femur_r (0.006541415 -0.358563 -0.02485738)
    Thelen2003Muscle tfl_r: max_isometric_force=233 optimal_fiber_length=0.08962014 tendon_slack_length=0.4009322
        pennation_angle_at_optimal=0.05235988
      PathPoint P1: pelvis (-0.03051421 0.02099692 0.1217625)
      PathPoint P2: femur_r (0.02747394 -0.09298154 0.05578892)
      PathPoint P3: femur_r (0.005046234 -0.3783741 0.03336122)
      PathPoint P4: tibia_r (0.005665761 -0.04598709 0.02804551)
    Thelen2003Muscle pect_r: max_isometric_force=266 optimal_fiber_length=0.09444402 tendon_slack_length=0.03116653
        pennation_angle_at_optimal=0
      PathPoint P1: pelvis (-0.04228818 -0.07535342 0.04425051)
      PathPoint P2: femur_r (-0.01140075 -0.0768149 0.02364254)
    Thelen2003Muscle grac_r: max_isometric_force=162 optimal_fiber_length=0.3282567 tendon_slack_length=0.117501
        pennation_angle_at_optimal=0.05235988
      PathPoint P1: pelvis (-0.07261598 -0.1164642 0.02741373)
      ConditionalPathPoint P2: tibia_r (-0.02508988 -0.03012296 -0.03563763)
          socket_coordinate=/jointset/walker_knee_r/knee_angle_r range=(-0.436332 0.174533)
      PathPoint P3: tibia_r (-0.01834762 -0.04865944 -0.0338057)
      PathPoint P4: tibia_r (0.005665761 -0.07894293 -0.02152989)
    Thelen2003Muscle glut_max1_r: max_isometric_force=573 optimal_fiber_length=0.1375006 tendon_slack_length=0.1210393
        pennation_angle_at_optimal=0.08726646
      PathPoint P1: pelvis (-0.1172491 0.06004726 0.06868151)
      PathPoint P2: pelvis (-0.1266683 0.001177397 0.08693116)
      PathPoint P3: femur_r (-0.04270609 -0.0231753 0.03663192)
      PathPoint P4: femur_r (-0.02588531 -0.05289201 0.04392093)
    Thelen2003Muscle glut_max2_r: max_isometric_force=819 optimal_fiber_length=0.1415028 tendon_slack_length=0.1222507
        pennation_angle_at_optimal=0
      PathPoint P1: pelvis (-0.1323591 0.01726849 0.05523955)
      PathPoint P2: pelvis (-0.1350082 -0.05102055 0.08967842)
      PathPoint P3: femur_r (-0.03980918 -0.04952786 0.02738049)
      PathPoint P4: femur_r (-0.01457801 -0.09494396 0.03915504)
    Thelen2003Muscle glut_max3_r: max_isometric_force=552 optimal_fiber_length=0.138309 tendon_slack_length=0.1392694
        pennation_angle_at_optimal=0.08726646
      PathPoint P1: pelvis (-0.1526692 -0.03080856 0.005690753)
      PathPoint P2: pelvis (-0.15002 -0.1032185 0.03954092)
      PathPoint P3: femur_r (-0.02794119 -0.09728018 0.01261559)
      PathPoint P4: femur_r (-0.005606927 -0.1326038 0.03840745)
    Thelen2003Muscle iliacus_r: max_isometric_force=1073 optimal_fiber_length=0.09651703 tendon_slack_length=0.09651703
        pennation_angle_at_optimal=0.1221731
      PathPoint P1: pelvis (-0.06613048 0.0358125 0.08379144)
      PathPoint P2: pelvis (-0.02531404 -0.05396404 0.07957243)
      ConditionalPathPoint P3: pelvis (-0.02825753 -0.07898373 0.08006301)
          socket_coordinate=/jointset/hip_r/hip_flexion_r range=(-1.5708 0.785398)
      PathPoint P4: femur_r (0.001588629 -0.05074269 0.005326581)
      PathPoint P5: femur_r (-0.01803562 -0.05803169 0.01205489)
    Thelen2003Muscle psoas_r: max_isometric_force=1113 optimal_fiber_length=0.09692181 tendon_slack_length=0.1550749
        pennation_angle_at_optimal=0.1396263
      PathPoint P1: pelvis (-0.06348133 0.08702928 0.02835565)
      PathPoint P2: pelvis (-0.02335171 -0.05592637 0.07447038)
      ConditionalPathPoint P3: pelvis (-0.02825753 -0.07898373 0.08006301)
          socket_coordinate=/jointset/hip_r/hip_flexion_r range=(-1.5708 0.785398)
      PathPoint P4: femur_r (0.001495181 -0.04737853 0.003551054)
      PathPoint P5: femur_r (-0.01756837 -0.05578892 0.009718674)
    Thelen2003Muscle quad_fem_r: max_isometric_force=381 optimal_fiber_length=0.05215146 tendon_slack_length=0.02317842
        pennation_angle_at_optimal=0
      PathPoint P1: pelvis (-0.1121471 -0.112932 0.05102055)
      PathPoint P2: femur_r (-0.03560399 -0.03354811 0.03420225)
    Thelen2003Muscle gem_r: max_isometric_force=164 optimal_fiber_length=0.02314231 tendon_slack_length=0.03760625
        pennation_angle_at_optimal=0
      PathPoint P1: pelvis (-0.1111659 -0.08045548 0.07005514)
      PathPoint P2: femur_r (-0.01326973 -0.00308381 0.04139781)
    Thelen2003Muscle peri_r: max_isometric_force=444 optimal_fiber_length=0.02534127 tendon_slack_length=0.1120864
        pennation_angle_at_optimal=0.1745329
      PathPoint P1: pelvis (-0.1369705 0.0002943493 0.02305736)
      PathPoint P2: pelvis (-0.1170529 -0.02708014 0.0644625)
      PathPoint P3: femur_r (-0.01383042 -0.003364156 0.04083712)
    Thelen2003Muscle rect_fem_r: max_isometric_force=1169 optimal_fiber_length=0.1070553 tendon_slack_length=0.2911152
        pennation_angle_at_optimal=0.08726646
      PathPoint P1: pelvis (-0.02894435 -0.03051421 0.09497671)
      ConditionalPathPoint P2: femur_r (0.03121189 -0.3765986 0.001775527)
          socket_coordinate=/jointset/walker_knee_r/knee_angle_r range=(-2.61799 -1.45997)
      MovingPathPoint P3: tibia_r socket_x_coordinate=/jointset/walker_knee_r/knee_angle_r
          socket_y_coordinate=/jointset/walker_knee_r/knee_angle_r
          socket_z_coordinate=/jointset/walker_knee_r/knee_angle_r
        x_location: MultiplierFunction: scale=0.9442934
          SimmSpline: x=(-2.0944 -1.99997 -1.5708 -1.45752 -1.39626 -1.0472 -0.698132 -0.526391 -0.349066 -0.174533 0 0.00017453 0.00034907 0.0279253 0.0872665 0.174533 2.0944)
              y=(0.0155805 0.0179938 0.0275081 0.0296564 0.0307615 0.0365695 0.0422074 0.0450902 0.048391 0.0534299 0.0617576 0.0617669 0.0617762 0.0633083 0.066994 0.0733035 0.0573481)
        y_location: MultiplierFunction: scale=0.9442934
          SimmSpline: x=(-2.0944 -1.99997 -1.5708 -1.45752 -1.39626 -1.0472 -0.698132 -0.526391 -0.349066 -0.174533 0 0.00017453 0.00034907 0.0279253 0.0872665 0.174533 2.0944)
              y=(0.0234116 0.0237613 0.0251141 0.0252795 0.0253146 0.0249184 0.0242373 0.0238447 0.0234197 0.0227644 0.020984 0.0209814 0.0209788 0.0205225 0.0191754 0.0159554 -0.0673774)
        z_location: MultiplierFunction: scale=0.9442934
          SimmSpline: x=(-2.0944 0.1745) y=(0.0014 0.0014)
    Thelen2003Muscle vas_med_r: max_isometric_force=1294 optimal_fiber_length=0.08312971 tendon_slack_length=0.1176893
        pennation_angle_at_optimal=0.08726646
      PathPoint P1: femur_r (0.01308283 -0.196149 0.01756837)
      PathPoint P2: femur_r (0.03326777 -0.2587597 0.0008410391)
      ConditionalPathPoint P3: femur_r (0.03457605 -0.3782807 -0.0116811)
          socket_coordinate=/jointset/walker_knee_r/knee_angle_r range=(-2.61799 -1.21004)
      ConditionalPathPoint P4: femur_r (0.02560497 -0.3976246 -0.01224179)
          socket_coordinate=/jointset/walker_knee_r/knee_angle_r range=(-2.61799 -1.78006)
      MovingPathPoint P5: tibia_r socket_x_coordinate=/jointset/walker_knee_r/knee_angle_r
          socket_y_coordinate=/jointset/walker_knee_r/knee_angle_r
          socket_z_coordinate=/jointset/walker_knee_r/knee_angle_r
        x_location: MultiplierFunction: scale=0.9442934
          SimmSpline: x=(-2.0944 -1.99997 -1.5708 -1.45752 -1.39626 -1.0472 -0.698132 -0.526391 -0.349066 -0.174533 0 0.00017453 0.00034907 0.0279253 0.0872665 0.174533 2.0944)
              y=(0.00981097 0.0122243 0.0217371 0.0238851 0.0249902 0.0307959 0.0364187 0.0392871 0.0425654 0.0475764 0.0559586 0.0559681 0.0559776 0.0575419 0.0613368 0.0679503 0.0629332)
        y_location: MultiplierFunction: scale=0.9442934
          SimmSpline: x=(-2.0944 -1.99997 -1.5708 -1.45752 -1.39626 -1.0472 -0.698132 -0.526391 -0.349066 -0.174533 0 0.00017453 0.00034907 0.0279253 0.0872665 0.174533 2.0944)
              y=(0.0224154 0.0227651 0.0241265 0.0242933 0.0243287 0.0239462 0.0233593 0.0230677 0.0228342 0.0226362 0.0217917 0.0217903 0.0217889 0.0215365 0.0206842 0.0183269 -0.0656205)
        z_location: MultiplierFunction: scale=0.9442934
          SimmSpline: x=(-2.0944 2.0944) y=(-0.0146 -0.0146)
    Thelen2003Muscle vas_int_r: max_isometric_force=1365 optimal_fiber_length=0.0812203 tendon_slack_length=0.1269651
        pennation_angle_at_optimal=0.05235988
      PathPoint P1: femur_r (0.02710015 -0.1797955 0.02896912)
      PathPoint P2: femur_r (0.03130534 -0.1947473 0.0266329)
      ConditionalPathPoint P3: femur_r (0.03205293 -0.3765986 0.005139683)
          socket_coordinate=/jointset/walker_knee_r/knee_angle_r range=(-2.61799 -1.42)
      MovingPathPoint P4: tibia_r socket_x_coordinate=/jointset/walker_knee_r/knee_angle_r
          socket_y_coordinate=/jointset/walker_knee_r/knee_angle_r
          socket_z_coordinate=/jointset/walker_knee_r/knee_angle_r
        x_location: MultiplierFunction: scale=0.9442934
          SimmSpline: x=(-2.0944 -1.99997 -1.5708 -1.45752 -1.39626 -1.0472 -0.698132 -0.526391 -0.349066 -0.174533 0 0.00017453 0.00034907 0.0279253 0.0872665 0.174533 2.0944)
              y=(0.0082733 0.0106866 0.0202042 0.022353 0.0234583 0.0292715 0.0349465 0.037871 0.0412569 0.0465287 0.0554632 0.0554735 0.0554837 0.0571717 0.061272 0.0684368 0.0648818)
        y_location: MultiplierFunction: scale=0.9442934
          SimmSpline: x=(-2.0944 -1.99997 -1.5708 -1.45752 -1.39626 -1.0472 -0.698132 -0.526391 -0.349066 -0.174533 0 0.00017453 0.00034907 0.0279253 0.0872665 0.174533 2.0944)
              y=(0.025599 0.0259487 0.0273124 0.0274796 0.0275151 0.0271363 0.0265737 0.0263073 0.0261187 0.0260129 0.0252923 0.0252911 0.0252898 0.0250526 0.0242191 0.0218288 -0.0685706)
        z_location: MultiplierFunction: scale=0.9442934
          SimmSpline: x=(-2.0944 2.0944) y=(0.0018 0.0018)
    Thelen2003Muscle vas_lat_r: max_isometric_force=1871 optimal_fiber_length=0.07847083 tendon_slack_length=0.1466657
        pennation_angle_at_optimal=0.08726646
      PathPoint P1: femur_r (0.004485542 -0.173254 0.03261363)
      PathPoint P2: femur_r (0.02513772 -0.2421258 0.03822055)
      ConditionalPathPoint P3: femur_r (0.03373501 -0.3765986 0.019157)
          socket_coordinate=/jointset/walker_knee_r/knee_angle_r range=(-2.61799 -1.21004)
      ConditionalPathPoint P4: femur_r (0.02364254 -0.3965032 0.01719458)
          socket_coordinate=/jointset/walker_knee_r/knee_angle_r range=(-2.61799 -1.92004)
      MovingPathPoint P5: tibia_r socket_x_coordinate=/jointset/walker_knee_r/knee_angle_r
          socket_y_coordinate=/jointset/walker_knee_r/knee_angle_r
          socket_z_coordinate=/jointset/walker_knee_r/knee_angle_r
        x_location: MultiplierFunction: scale=0.9442934
          SimmSpline: x=(-2.0944 -1.99997 -1.5708 -1.45752 -1.39626 -1.0472 -0.698132 -0.526391 -0.349066 -0.174533 0 0.00017453 0.00034907 0.0279253 0.0872665 0.174533 2.0944)
              y=(0.0142897 0.016703 0.0262145 0.0283623 0.0294674 0.0352709 0.0408785 0.0437291 0.0469704 0.0518742 0.0599557 0.0599647 0.0599738 0.0614577 0.0650351 0.0711867 0.0583766)
        y_location: MultiplierFunction: scale=0.9442934
          SimmSpline: x=(-2.0944 -1.99997 -1.5708 -1.45752 -1.39626 -1.0472 -0.698132 -0.526391 -0.349066 -0.174533 0 0.00017453 0.00034907 0.0279253 0.0872665 0.174533 2.0944)
              y=(0.0215318 0.0218815 0.0232362 0.0234019 0.0234371 0.0230439 0.0223842 0.0220151 0.0216359 0.0210971 0.0195864 0.0195842 0.019582 0.01919 0.018008 0.0151073 -0.0653421)
        z_location: MultiplierFunction: scale=0.9442934
          SimmSpline: x=(-2.0944 2.0944) y=(0.0165 0.0165)
    Thelen2003Muscle med_gas_r: max_isometric_force=1558 optimal_fiber_length=0.05638715 tendon_slack_length=0.3665165
        pennation_angle_at_optimal=0.296706
      PathPoint P1: femur_r (-0.01775527 -0.3671603 -0.02196046)
      ConditionalPathPoint P2: femur_r (-0.02803464 -0.375851 -0.02410979)
          socket_coordinate=/jointset/walker_knee_r/knee_angle_r range=(-0.785398 0.174533)
      PathPoint P3: calcn_r (0 0.02537133 -0.004337678)
    Thelen2003Muscle lat_gas_r: max_isometric_force=683 optimal_fiber_length=0.060155 tendon_slack_length=0.3571703
        pennation_angle_at_optimal=0.1396263
      PathPoint P1: femur_r (-0.02055873 -0.3687489 0.02541807)
      ConditionalPathPoint P2: femur_r (-0.02803464 -0.3754772 0.02560497)
          socket_coordinate=/jointset/walker_knee_r/knee_angle_r range=(-0.785398 0.174533)
      PathPoint P3: calcn_r (0 0.02537133 -0.004337678)
    Thelen2003Muscle soleus_r: max_isometric_force=3549 optimal_fiber_length=0.04672448 tendon_slack_length=0.2336224
        pennation_angle_at_optimal=0.4363323
      PathPoint P1: tibia_r (-0.002266304 -0.1447602 0.006704483)
      PathPoint P2: calcn_r (0 0.02537133 -0.004337678)
    Thelen2003Muscle tib_post_r: max_isometric_force=1588 optimal_fiber_length=0.02886372 tendon_slack_length=0.2886372
        pennation_angle_at_optimal=0.2094395
      PathPoint P1: tibia_r (-0.008876358 -0.1272908 0.001794158)
      PathPoint P2: tibia_r (-0.01359783 -0.3825333 -0.02162432)
      PathPoint P3: calcn_r (0.03412853 0.02733556 -0.02340709)
      PathPoint P4: calcn_r (0.06318279 0.01301304 -0.02299788)
    Thelen2003Muscle flex_dig_r: max_isometric_force=310 optimal_fiber_length=0.02996815 tendon_slack_length=0.3525665
        pennation_angle_at_optimal=0.1221731
      PathPoint P1: tibia_r (-0.007837635 -0.1932024 -0.001699728)
      PathPoint P2: tibia_r (-0.01454212 -0.3825333 -0.01850815)
      PathPoint P3: calcn_r (0.03568354 0.02578054 -0.02291604)
      PathPoint P4: calcn_r (0.05794484 0.01440437 -0.02152471)
      PathPoint P5: calcn_r (0.1356957 -0.006629282 0.009493787)
      PathPoint P6: toes_r (-0.001555017 -0.006383753 0.01203092)
      PathPoint P7: toes_r (0.02332525 -0.005810852 0.01759624)
      PathPoint P8: toes_r (0.03609276 -0.004910579 0.019806)
    Thelen2003Muscle flex_hal_r: max_isometric_force=322 optimal_fiber_length=0.03764694 tendon_slack_length=0.3326939
        pennation_angle_at_optimal=0.1745329
      PathPoint P1: tibia_r (-0.007459918 -0.2203981 0.02304076)
      PathPoint P2: tibia_r (-0.01756386 -0.3851773 -0.01643071)
      PathPoint P3: calcn_r (0.03060928 0.02258866 -0.01972416)
      PathPoint P4: calcn_r (0.08495302 0.005565323 -0.02095181)
      PathPoint P5: calcn_r (0.141261 -0.004337678 -0.02201576)
      PathPoint P6: toes_r (0.01268566 -0.005237951 -0.02168839)
      PathPoint P7: toes_r (0.04599576 -0.008347985 -0.01481358)
    Thelen2003Muscle tib_ant_r: max_isometric_force=905 optimal_fiber_length=0.0897651 tendon_slack_length=0.2042614
        pennation_angle_at_optimal=0.08726646
      PathPoint P1: tibia_r (0.01690285 -0.1533533 0.01085937)
      PathPoint P2: tibia_r (0.03106725 -0.3730903 -0.01671399)
      PathPoint P3: calcn_r (0.09542893 0.01456805 -0.02496211)
    Thelen2003Muscle per_brev_r: max_isometric_force=435 optimal_fiber_length=0.046924 tendon_slack_length=0.1510953
        pennation_angle_at_optimal=0.08726646
      PathPoint P1: tibia_r (-0.006610054 -0.24986 0.03068954)
      PathPoint P2: tibia_r (-0.01869701 -0.3950924 0.0267235)
      PathPoint P3: tibia_r (-0.01359783 -0.405574 0.02729008)
      PathPoint P4: calcn_r (0.03854805 0.02209761 0.01906942)
      PathPoint P5: calcn_r (0.0554077 0.01792361 0.02807215)
    Thelen2003Muscle per_long_r: max_isometric_force=943 optimal_fiber_length=0.04504063 tendon_slack_length=0.3171228
        pennation_angle_at_optimal=0.1745329
      PathPoint P1: tibia_r (0.0004721467 -0.1480652 0.03418342)
      PathPoint P2: tibia_r (-0.01954687 -0.3970754 0.02700679)
      PathPoint P3: tibia_r (-0.01529755 -0.4078403 0.02729008)
      PathPoint P4: calcn_r (0.03584723 0.01882389 0.0180873)
      PathPoint P5: calcn_r (0.05573508 0.008675357 0.02324341)
      PathPoint P6: calcn_r (0.06973023 0.005647166 0.009657473)
      PathPoint P7: calcn_r (0.09845712 0.006956654 -0.01505911)
    Thelen2003Muscle per_tert_r: max_isometric_force=180 optimal_fiber_length=0.07171958 tendon_slack_length=0.09078428
        pennation_angle_at_optimal=0.2268928
      PathPoint P1: tibia_r (0.0009442934 -0.2647799 0.02181318)
      PathPoint P2: tibia_r (0.02162432 -0.384233 0.01501427)
      PathPoint P3: calcn_r (0.07013944 0.0186602 0.02447105)
    Thelen2003Muscle ext_dig_r: max_isometric_force=512 optimal_fiber_length=0.09125549 tendon_slack_length=0.3086583
        pennation_angle_at_optimal=0.1396263
      PathPoint P1: tibia_r (0.003021739 -0.1304069 0.0260625)
      PathPoint P2: tibia_r (0.02729008 -0.3783784 0.006798913)
      PathPoint P3: calcn_r (0.07545924 0.03175508 -8.184299e-5)
      PathPoint P4: calcn_r (0.1322583 0.004501364 0.01063959)
      PathPoint P5: toes_r (0.000245529 0.00384662 0.01252198)
      PathPoint P6: toes_r (0.03625644 -0.000327372 0.02046075)
    Thelen2003Muscle ext_hal_r: max_isometric_force=162 optimal_fiber_length=0.0985111 tendon_slack_length=0.2706837
        pennation_angle_at_optimal=0.1047198
      PathPoint P1: tibia_r (0.001133152 -0.1668566 0.02152989)
      PathPoint P2: tibia_r (0.03078397 -0.3763009 -0.008026494)
      PathPoint P3: calcn_r (0.0793877 0.03183692 -0.01726887)
      PathPoint P4: calcn_r (0.105823 0.02528948 -0.02103365)
      PathPoint P5: calcn_r (0.1419157 0.01137618 -0.02291604)
      PathPoint P6: toes_r (0.02438921 0.003355563 -0.02005153)
      PathPoint P7: toes_r (0.0460776 0.002782662 -0.0152228)
    Thelen2003Muscle glut_med1_l: max_isometric_force=819 optimal_fiber_length=0.05205638
        tendon_slack_length=0.07589528 pennation_angle_at_optimal=0.1396263
      PathPoint P1: pelvis (-0.04003151 0.0298274 -0.1186228)
      PathPoint P2: femur_l (-0.02037183 -0.01093351 -0.05186408)
    Thelen2003Muscle glut_med2_l: max_isometric_force=573 optimal_fiber_length=0.08221833 tendon_slack_length=0.0515689
        pennation_angle_at_optimal=0
      PathPoint P1: pelvis (-0.08388955 0.04366181 -0.07515719)
      PathPoint P2: femur_l (-0.02410979 -0.005420029 -0.04924751)
    Thelen2003Muscle glut_med3_l: max_isometric_force=653 optimal_fiber_length=0.06282709
        tendon_slack_length=0.05154545 pennation_angle_at_optimal=0.3316126
      PathPoint P1: pelvis (-0.1199964 0.01030223 -0.06357945)
      PathPoint P2: femur_l (-0.02887567 -0.004392093 -0.04840647)
    Thelen2003Muscle glut_min1_l: max_isometric_force=270 optimal_fiber_length=0.06569399
        tendon_slack_length=0.01545741 pennation_angle_at_optimal=0.1745329
      PathPoint P1: pelvis (-0.04582038 -0.007849315 -0.103611)
      PathPoint P2: femur_l (-0.006728312 -0.009718674 -0.05233132)
    Thelen2003Muscle glut_min2_l: max_isometric_force=285 optimal_fiber_length=0.05404643
        tendon_slack_length=0.02509299 pennation_angle_at_optimal=0
      PathPoint P1: pelvis (-0.0621077 -0.006377568 -0.09723339)
      PathPoint P2: femur_l (-0.008971083 -0.009718674 -0.05233132)
    Thelen2003Muscle glut_min3_l: max_isometric_force=323 optimal_fiber_length=0.03668307
        tendon_slack_length=0.04923254 pennation_angle_at_optimal=0.01745329
      PathPoint P1: pelvis (-0.08182911 -0.006181336 -0.08398767)
      PathPoint P2: femur_l (-0.01261559 -0.007756249 -0.05139683)
    Thelen2003Muscle semimem_l: max_isometric_force=1288 optimal_fiber_length=0.07471953 tendon_slack_length=0.3353039
        pennation_angle_at_optimal=0.2617994
      PathPoint P1: pelvis (-0.1169548 -0.09563409 -0.07016306)
      ConditionalPathPoint P2: tibia_l (-0.03286141 -0.03322969 0.01785659)
          socket_coordinate=/jointset/walker_knee_l/knee_angle_l range=(-0.558505 0.174533)
      PathPoint P3: tibia_l (-0.02549592 -0.04505224 0.01847982)
    Thelen2003Muscle semiten_l: max_isometric_force=410 optimal_fiber_length=0.1877608 tendon_slack_length=0.2386711
        pennation_angle_at_optimal=0.08726646
      PathPoint P1: pelvis (-0.1239701 -0.1078103 -0.05925252)
      ConditionalPathPoint P2: tibia_l (-0.03968865 -0.02699735 0.02150156)
          socket_coordinate=/jointset/walker_knee_l/knee_angle_l range=(-0.331613 0.174533)
      PathPoint P3: tibia_l (-0.03136943 -0.04987758 0.02160543)
      PathPoint P4: tibia_l (-0.01067052 -0.07044429 0.02313519)
      PathPoint P5: tibia_l (0.002549592 -0.09027445 0.01822486)
    Thelen2003Muscle bifemlh_l: max_isometric_force=896 optimal_fiber_length=0.1018092 tendon_slack_length=0.3044935
        pennation_angle_at_optimal=0
      PathPoint P1: pelvis (-0.1235875 -0.100638 -0.06813205)
      PathPoint P2: tibia_l (-0.02842323 -0.03399456 -0.02779056)
      PathPoint P3: tibia_l (-0.02209647 -0.05316372 -0.03238926)
    Thelen2003Muscle bifemsh_l: max_isometric_force=804 optimal_fiber_length=0.1620851 tendon_slack_length=0.08338484
        pennation_angle_at_optimal=0.4014257
      PathPoint P1: femur_l (0.004672439 -0.1972704 -0.02186702)
      PathPoint P2: tibia_l (-0.02842323 -0.03399456 -0.02779056)
      PathPoint P3: tibia_l (-0.02209647 -0.05316372 -0.03238926)
    Thelen2003Muscle sar_l: max_isometric_force=156 optimal_fiber_length=0.4904233 tendon_slack_length=0.09431218
        pennation_angle_at_optimal=0
      PathPoint P1: pelvis (-0.01501181 -0.001275514 -0.1218606)
      PathPoint P2: femur_l (-0.002803464 -0.3334253 0.03934194)
      PathPoint P3: tibia_l (-0.005288043 -0.03956589 0.03767731)
      PathPoint P4: tibia_l (0.005665761 -0.05561888 0.03616644)
      PathPoint P5: tibia_l (0.02294633 -0.07932065 0.02379619)
    Thelen2003Muscle add_long_l: max_isometric_force=627 optimal_fiber_length=0.129552 tendon_slack_length=0.103266
        pennation_angle_at_optimal=0.1047198
      PathPoint P1: pelvis (-0.03100479 -0.08202534 -0.01658168)
      PathPoint P2: femur_l (0.004672439 -0.1972704 -0.02186702)
    Thelen2003Muscle add_brev_l: max_isometric_force=429 optimal_fiber_length=0.1256192 tendon_slack_length=0.0188901
        pennation_angle_at_optimal=0
      PathPoint P1: pelvis (-0.05759435 -0.08977654 -0.0160911)
      PathPoint P2: femur_l (0.0008410391 -0.1117647 -0.02747394)
    Thelen2003Muscle add_mag1_l: max_isometric_force=381 optimal_fiber_length=0.08174328 tendon_slack_length=0.05637467
        pennation_angle_at_optimal=0.08726646
      PathPoint P1: pelvis (-0.07182123 -0.1151887 -0.02501969)
      PathPoint P2: femur_l (-0.004205195 -0.1131665 -0.03167914)
    Thelen2003Muscle add_mag2_l: max_isometric_force=343 optimal_fiber_length=0.1125972 tendon_slack_length=0.1116667
        pennation_angle_at_optimal=0.05235988
      PathPoint P1: pelvis (-0.08153476 -0.1169548 -0.03021986)
      PathPoint P2: femur_l (0.005046234 -0.2135305 -0.02121287)
    Thelen2003Muscle add_mag3_l: max_isometric_force=488 optimal_fiber_length=0.1219847 tendon_slack_length=0.231864
        pennation_angle_at_optimal=0.08726646
      PathPoint P1: pelvis (-0.1089877 -0.1119803 -0.04790044)
      PathPoint P2: femur_l (0.006541415 -0.358563 0.02485738)
    Thelen2003Muscle tfl_l: max_isometric_force=233 optimal_fiber_length=0.08962014 tendon_slack_length=0.4009322
        pennation_angle_at_optimal=0.05235988
      PathPoint P1: pelvis (-0.03051421 0.02099692 -0.1217625)
      PathPoint P2: femur_l (0.02747394 -0.09298154 -0.05578892)
      PathPoint P3: femur_l (0.005046234 -0.3783741 -0.03336122)
      PathPoint P4: tibia_l (0.005665761 -0.04598709 -0.02804551)
    Thelen2003Muscle pect_l: max_isometric_force=266 optimal_fiber_length=0.09444402 tendon_slack_length=0.03116653
        pennation_angle_at_optimal=0
      PathPoint P1: pelvis (-0.04228818 -0.07535342 -0.04425051)
      PathPoint P2: femur_l (-0.01140075 -0.0768149 -0.02364254)
    Thelen2003Muscle grac_l: max_isometric_force=162 optimal_fiber_length=0.3282567 tendon_slack_length=0.117501
        pennation_angle_at_optimal=0.05235988
      PathPoint P1: pelvis (-0.07261598 -0.1164642 -0.02741373)
      ConditionalPathPoint P2: tibia_l (-0.02508988 -0.03012296 0.03563763)
          socket_coordinate=/jointset/walker_knee_l/knee_angle_l range=(-0.436332 0.174533)
      PathPoint P3: tibia_l (-0.01834762 -0.04865944 0.0338057)
      PathPoint P4: tibia_l (0.005665761 -0.07894293 0.02152989)
    Thelen2003Muscle glut_max1_l: max_isometric_force=573 optimal_fiber_length=0.1375006 tendon_slack_length=0.1210393
        pennation_angle_at_optimal=0.08726646
      PathPoint P1: pelvis (-0.1172491 0.06004726 -0.06868151)
      PathPoint P2: pelvis (-0.1266683 0.001177397 -0.08693116)
      PathPoint P3: femur_l (-0.04270609 -0.0231753 -0.03663192)
      PathPoint P4: femur_l (-0.02588531 -0.05289201 -0.04392093)
    Thelen2003Muscle glut_max2_l: max_isometric_force=819 optimal_fiber_length=0.1415028 tendon_slack_length=0.1222507
        pennation_angle_at_optimal=0
      PathPoint P1: pelvis (-0.1323591 0.01726849 -0.05523955)
      PathPoint P2: pelvis (-0.1350082 -0.05102055 -0.08967842)
      PathPoint P3: femur_l (-0.03980918 -0.04952786 -0.02738049)
      PathPoint P4: femur_l (-0.01457801 -0.09494396 -0.03915504)
    Thelen2003Muscle glut_max3_l: max_isometric_force=552 optimal_fiber_length=0.138309 tendon_slack_length=0.1392694
        pennation_angle_at_optimal=0.08726646
      PathPoint P1: pelvis (-0.1526692 -0.03080856 -0.005690753)
      PathPoint P2: pelvis (-0.15002 -0.1032185 -0.03954092)
      PathPoint P3: femur_l (-0.02794119 -0.09728018 -0.01261559)
      PathPoint P4: femur_l (-0.005606927 -0.1326038 -0.03840745)
    Thelen2003Muscle iliacus_l: max_isometric_force=1073 optimal_fiber_length=0.09651703 tendon_slack_length=0.09651703
        pennation_angle_at_optimal=0.1221731
      PathPoint P1: pelvis (-0.06613048 0.0358125 -0.08379144)
      PathPoint P2: pelvis (-0.02531404 -0.05396404 -0.07957243)
      ConditionalPathPoint P3: pelvis (-0.02825753 -0.07898373 -0.08006301)
          socket_coordinate=/jointset/hip_l/hip_flexion_l range=(-1.5708 0.785398)
      PathPoint P4: femur_l (0.001588629 -0.05074269 -0.005326581)
      PathPoint P5: femur_l (-0.01803562 -0.05803169 -0.01205489)
    Thelen2003Muscle psoas_l: max_isometric_force=1113 optimal_fiber_length=0.09692181 tendon_slack_length=0.1550749
        pennation_angle_at_optimal=0.1396263
      PathPoint P1: pelvis (-0.06348133 0.08702928 -0.02835565)
      PathPoint P2: pelvis (-0.02335171 -0.05592637 -0.07447038)
      ConditionalPathPoint P3: pelvis (-0.02825753 -0.07898373 -0.08006301)
          socket_coordinate=/jointset/hip_l/hip_flexion_l range=(-1.5708 0.785398)
      PathPoint P4: femur_l (0.001495181 -0.04737853 -0.003551054)
      PathPoint P5: femur_l (-0.01756837 -0.05578892 -0.009718674)
    Thelen2003Muscle quad_fem_l: max_isometric_force=381 optimal_fiber_length=0.05215146 tendon_slack_length=0.02317842
        pennation_angle_at_optimal=0
      PathPoint P1: pelvis (-0.1121471 -0.112932 -0.05102055)
      PathPoint P2: femur_l (-0.03560399 -0.03354811 -0.03420225)
    Thelen2003Muscle gem_l: max_isometric_force=164 optimal_fiber_length=0.02314231 tendon_slack_length=0.03760625
        pennation_angle_at_optimal=0
      PathPoint P1: pelvis (-0.1111659 -0.08045548 -0.07005514)
      PathPoint P2: femur_l (-0.01326973 -0.00308381 -0.04139781)
    Thelen2003Muscle peri_l: max_isometric_force=444 optimal_fiber_length=0.02534127 tendon_slack_length=0.1120864
        pennation_angle_at_optimal=0.1745329
      PathPoint P1: pelvis (-0.1369705 0.0002943493 -0.02305736)
      PathPoint P2: pelvis (-0.1170529 -0.02708014 -0.0644625)
      PathPoint P3: femur_l (-0.01383042 -0.003364156 -0.04083712)
    Thelen2003Muscle rect_fem_l: max_isometric_force=1169 optimal_fiber_length=0.1070553 tendon_slack_length=0.2911152
        pennation_angle_at_optimal=0.08726646
      PathPoint P1: pelvis (-0.02894435 -0.03051421 -0.09497671)
      ConditionalPathPoint P2: femur_l (0.03121189 -0.3765986 -0.001775527)
          socket_coordinate=/jointset/walker_knee_l/knee_angle_l range=(-2.61799 -1.45997)
      MovingPathPoint P3: tibia_l socket_x_coordinate=/jointset/walker_knee_l/knee_angle_l
          socket_y_coordinate=/jointset/walker_knee_l/knee_angle_l
          socket_z_coordinate=/jointset/walker_knee_l/knee_angle_l
        x_location: MultiplierFunction: scale=0.9442934
          SimmSpline: x=(-2.0944 -1.99997 -1.5708 -1.45752 -1.39626 -1.0472 -0.698132 -0.526391 -0.349066 -0.174533 0 0.00017453 0.00034907 0.0279253 0.0872665 0.174533 2.0944)
              y=(0.0155805 0.0179938 0.0275081 0.0296564 0.0307615 0.0365695 0.0422074 0.0450902 0.048391 0.0534299 0.0617576 0.0617669 0.0617762 0.0633083 0.066994 0.0733035 0.0573481)
        y_location: MultiplierFunction: scale=0.9442934
          SimmSpline: x=(-2.0944 -1.99997 -1.5708 -1.45752 -1.39626 -1.0472 -0.698132 -0.526391 -0.349066 -0.174533 0 0.00017453 0.00034907 0.0279253 0.0872665 0.174533 2.0944)
              y=(0.0234116 0.0237613 0.0251141 0.0252795 0.0253146 0.0249184 0.0242373 0.0238447 0.0234197 0.0227644 0.020984 0.0209814 0.0209788 0.0205225 0.0191754 0.0159554 -0.0673774)
        z_location: MultiplierFunction: scale=0.9442934
          SimmSpline: x=(-2.0944 0.1745) y=(-0.0014 -0.0014)
    Thelen2003Muscle vas_med_l: max_isometric_force=1294 optimal_fiber_length=0.08312971 tendon_slack_length=0.1176893
        pennation_angle_at_optimal=0.08726646
      PathPoint P1: femur_l (0.01308283 -0.196149 -0.01756837)
      PathPoint P2: femur_l (0.03326777 -0.2587597 -0.0008410391)
      ConditionalPathPoint P3: femur_l (0.03457605 -0.3782807 0.0116811)
          socket_coordinate=/jointset/walker_knee_l/knee_angle_l range=(-2.61799 -1.21004)
      ConditionalPathPoint P4: femur_l (0.02560497 -0.3976246 0.01224179)
          socket_coordinate=/jointset/walker_knee_l/knee_angle_l range=(-2.61799 -1.78006)
      MovingPathPoint P5: tibia_l socket_x_coordinate=/jointset/walker_knee_l/knee_angle_l
          socket_y_coordinate=/jointset/walker_knee_l/knee_angle_l
          socket_z_coordinate=/jointset/walker_knee_l/knee_angle_l
        x_location: MultiplierFunction: scale=0.9442934
          SimmSpline: x=(-2.0944 -1.99997 -1.5708 -1.45752 -1.39626 -1.0472 -0.698132 -0.526391 -0.349066 -0.174533 0 0.00017453 0.00034907 0.0279253 0.0872665 0.174533 2.0944)
              y=(0.00981097 0.0122243 0.0217371 0.0238851 0.0249902 0.0307959 0.0364187 0.0392871 0.0425654 0.0475764 0.0559586 0.0559681 0.0559776 0.0575419 0.0613368 0.0679503 0.0629332)
        y_location: MultiplierFunction: scale=0.9442934
          SimmSpline: x=(-2.0944 -1.99997 -1.5708 -1.45752 -1.39626 -1.0472 -0.698132 -0.526391 -0.349066 -0.174533 0 0.00017453 0.00034907 0.0279253 0.0872665 0.174533 2.0944)
              y=(0.0224154 0.0227651 0.0241265 0.0242933 0.0243287 0.0239462 0.0233593 0.0230677 0.0228342 0.0226362 0.0217917 0.0217903 0.0217889 0.0215365 0.0206842 0.0183269 -0.0656205)
        z_location: MultiplierFunction: scale=0.9442934
          SimmSpline: x=(-2.0944 2.0944) y=(0.0146 0.0146)
    Thelen2003Muscle vas_int_l: max_isometric_force=1365 optimal_fiber_length=0.0812203 tendon_slack_length=0.1269651
        pennation_angle_at_optimal=0.05235988
      PathPoint P1: femur_l (0.02710015 -0.1797955 -0.02896912)
      PathPoint P2: femur_l (0.03130534 -0.1947473 -0.0266329)
      ConditionalPathPoint P3: femur_l (0.03205293 -0.3765986 -0.005139683)
          socket_coordinate=/jointset/walker_knee_l/knee_angle_l range=(-2.61799 -1.42)
      MovingPathPoint P4: tibia_l socket_x_coordinate=/jointset/walker_knee_l/knee_angle_l
          socket_y_coordinate=/jointset/walker_knee_l/knee_angle_l
          socket_z_coordinate=/jointset/walker_knee_l/knee_angle_l
        x_location: MultiplierFunction: scale=0.9442934
          SimmSpline: x=(-2.0944 -1.99997 -1.5708 -1.45752 -1.39626 -1.0472 -0.698132 -0.526391 -0.349066 -0.174533 0 0.00017453 0.00034907 0.0279253 0.0872665 0.174533 2.0944)
              y=(0.0082733 0.0106866 0.0202042 0.022353 0.0234583 0.0292715 0.0349465 0.037871 0.0412569 0.0465287 0.0554632 0.0554735 0.0554837 0.0571717 0.061272 0.0684368 0.0648818)
        y_location: MultiplierFunction: scale=0.9442934
          SimmSpline: x=(-2.0944 -1.99997 -1.5708 -1.45752 -1.39626 -1.0472 -0.698132 -0.526391 -0.349066 -0.174533 0 0.00017453 0.00034907 0.0279253 0.0872665 0.174533 2.0944)
              y=(0.025599 0.0259487 0.0273124 0.0274796 0.0275151 0.0271363 0.0265737 0.0263073 0.0261187 0.0260129 0.0252923 0.0252911 0.0252898 0.0250526 0.0242191 0.0218288 -0.0685706)
        z_location: MultiplierFunction: scale=0.9442934
          SimmSpline: x=(-2.0944 2.0944) y=(-0.0018 -0.0018)
    Thelen2003Muscle vas_lat_l: max_isometric_force=1871 optimal_fiber_length=0.07847083 tendon_slack_length=0.1466657
        pennation_angle_at_optimal=0.08726646
      PathPoint P1: femur_l (0.004485542 -0.173254 -0.03261363)
      PathPoint P2: femur_l (0.02513772 -0.2421258 -0.03822055)
      ConditionalPathPoint P3: femur_l (0.03373501 -0.3765986 -0.019157)
          socket_coordinate=/jointset/walker_knee_l/knee_angle_l range=(-2.61799 -1.21004)
      ConditionalPathPoint P4: femur_l (0.02364254 -0.3965032 -0.01719458)
          socket_coordinate=/jointset/walker_knee_l/knee_angle_l range=(-2.61799 -1.92004)
      MovingPathPoint P5: tibia_l socket_x_coordinate=/jointset/walker_knee_l/knee_angle_l
          socket_y_coordinate=/jointset/walker_knee_l/knee_angle_l
          socket_z_coordinate=/jointset/walker_knee_l/knee_angle_l
        x_location: MultiplierFunction: scale=0.9442934
          SimmSpline: x=(-2.0944 -1.99997 -1.5708 -1.45752 -1.39626 -1.0472 -0.698132 -0.526391 -0.349066 -0.174533 0 0.00017453 0.00034907 0.0279253 0.0872665 0.174533 2.0944)
              y=(0.0142897 0.016703 0.0262145 0.0283623 0.0294674 0.0352709 0.0408785 0.0437291 0.0469704 0.0518742 0.0599557 0.0599647 0.0599738 0.0614577 0.0650351 0.0711867 0.0583766)
        y_location: MultiplierFunction: scale=0.9442934
          SimmSpline: x=(-2.0944 -1.99997 -1.5708 -1.45752 -1.39626 -1.0472 -0.698132 -0.526391 -0.349066 -0.174533 0 0.00017453 0.00034907 0.0279253 0.0872665 0.174533 2.0944)
              y=(0.0215318 0.0218815 0.0232362 0.0234019 0.0234371 0.0230439 0.0223842 0.0220151 0.0216359 0.0210971 0.0195864 0.0195842 0.019582 0.01919 0.018008 0.0151073 -0.0653421)
        z_location: MultiplierFunction: scale=0.9442934
          SimmSpline: x=(-2.0944 2.0944) y=(-0.0165 -0.0165)
    Thelen2003Muscle med_gas_l: max_isometric_force=1558 optimal_fiber_length=0.05638715 tendon_slack_length=0.3665165
        pennation_angle_at_optimal=0.296706
      PathPoint P1: femur_l (-0.01775527 -0.3671603 0.02196046)
      ConditionalPathPoint P2: femur_l (-0.02803464 -0.375851 0.02410979)
          socket_coordinate=/jointset/walker_knee_l/knee_angle_l range=(-0.785398 0.174533)
      PathPoint P3: calcn_l (0 0.02537133 0.004337678)
    Thelen2003Muscle lat_gas_l: max_isometric_force=683 optimal_fiber_length=0.060155 tendon_slack_length=0.3571703
        pennation_angle_at_optimal=0.1396263
      PathPoint P1: femur_l (-0.02055873 -0.3687489 -0.02541807)
      ConditionalPathPoint P2: femur_l (-0.02803464 -0.3754772 -0.02560497)
          socket_coordinate=/jointset/walker_knee_l/knee_angle_l range=(-0.785398 0.174533)
      PathPoint P3: calcn_l (0 0.02537133 0.004337678)
    Thelen2003Muscle soleus_l: max_isometric_force=3549 optimal_fiber_length=0.04672448 tendon_slack_length=0.2336224
        pennation_angle_at_optimal=0.4363323
      PathPoint P1: tibia_l (-0.002266304 -0.1447602 -0.006704483)
      PathPoint P2: calcn_l (0 0.02537133 0.004337678)
    Thelen2003Muscle tib_post_l: max_isometric_force=1588 optimal_fiber_length=0.02886372 tendon_slack_length=0.2886372
        pennation_angle_at_optimal=0.2094395
      PathPoint P1: tibia_l (-0.008876358 -0.1272908 -0.001794158)
      PathPoint P2: tibia_l (-0.01359783 -0.3825333 0.02162432)
      PathPoint P3: calcn_l (0.03412853 0.02733556 0.02340709)
      PathPoint P4: calcn_l (0.06318279 0.01301304 0.02299788)
    Thelen2003Muscle flex_dig_l: max_isometric_force=310 optimal_fiber_length=0.02996815 tendon_slack_length=0.3525665
        pennation_angle_at_optimal=0.1221731
      PathPoint P1: tibia_l (-0.007837635 -0.1932024 0.001699728)
      PathPoint P2: tibia_l (-0.01454212 -0.3825333 0.01850815)
      PathPoint P3: calcn_l (0.03568354 0.02578054 0.02291604)
      PathPoint P4: calcn_l (0.05794484 0.01440437 0.02152471)
      PathPoint P5: calcn_l (0.1356957 -0.006629282 -0.009493787)
      PathPoint P6: toes_l (-0.001555017 -0.006383753 -0.01203092)
      PathPoint P7: toes_l (0.02332525 -0.005810852 -0.01759624)
      PathPoint P8: toes_l (0.03609276 -0.004910579 -0.019806)
    Thelen2003Muscle flex_hal_l: max_isometric_force=322 optimal_fiber_length=0.03764694 tendon_slack_length=0.3326939
        pennation_angle_at_optimal=0.1745329
      PathPoint P1: tibia_l (-0.007459918 -0.2203981 -0.02304076)
      PathPoint P2: tibia_l (-0.01756386 -0.3851773 0.01643071)
      PathPoint P3: calcn_l (0.03060928 0.02258866 0.01972416)
      PathPoint P4: calcn_l (0.08495302 0.005565323 0.02095181)
      PathPoint P5: calcn_l (0.141261 -0.004337678 0.02201576)
      PathPoint P6: toes_l (0.01268566 -0.005237951 0.02168839)
      PathPoint P7: toes_l (0.04599576 -0.008347985 0.01481358)
    Thelen2003Muscle tib_ant_l: max_isometric_force=905 optimal_fiber_length=0.0897651 tendon_slack_length=0.2042614
        pennation_angle_at_optimal=0.08726646
      PathPoint P1: tibia_l (0.01690285 -0.1533533 -0.01085937)
      PathPoint P2: tibia_l (0.03106725 -0.3730903 0.01671399)
      PathPoint P3: calcn_l (0.09542893 0.01456805 0.02496211)
    Thelen2003Muscle per_brev_l: max_isometric_force=435 optimal_fiber_length=0.046924 tendon_slack_length=0.1510953
        pennation_angle_at_optimal=0.08726646
      PathPoint P1: tibia_l (-0.006610054 -0.24986 -0.03068954)
      PathPoint P2: tibia_l (-0.01869701 -0.3950924 -0.0267235)
      PathPoint P3: tibia_l (-0.01359783 -0.405574 -0.02729008)
      PathPoint P4: calcn_l (0.03854805 0.02209761 -0.01906942)
      PathPoint P5: calcn_l (0.0554077 0.01792361 -0.02807215)
    Thelen2003Muscle per_long_l: max_isometric_force=943 optimal_fiber_length=0.04504063 tendon_slack_length=0.3171228
        pennation_angle_at_optimal=0.1745329
      PathPoint P1: tibia_l (0.0004721467 -0.1480652 -0.03418342)
      PathPoint P2: tibia_l (-0.01954687 -0.3970754 -0.02700679)
      PathPoint P3: tibia_l (-0.01529755 -0.4078403 -0.02729008)
      PathPoint P4: calcn_l (0.03584723 0.01882389 -0.0180873)
      PathPoint P5: calcn_l (0.05573508 0.008675357 -0.02324341)
      PathPoint P6: calcn_l (0.06973023 0.005647166 -0.009657473)
      PathPoint P7: calcn_l (0.09845712 0.006956654 0.01505911)
    Thelen2003Muscle per_tert_l: max_isometric_force=180 optimal_fiber_length=0.07171958 tendon_slack_length=0.09078428
        pennation_angle_at_optimal=0.2268928
      PathPoint P1: tibia_l (0.0009442934 -0.2647799 -0.02181318)
      PathPoint P2: tibia_l (0.02162432 -0.384233 -0.01501427)
      PathPoint P3: calcn_l (0.07013944 0.0186602 -0.02447105)
    Thelen2003Muscle ext_dig_l: max_isometric_force=512 optimal_fiber_length=0.09125549 tendon_slack_length=0.3086583
        pennation_angle_at_optimal=0.1396263
      PathPoint P1: tibia_l (0.003021739 -0.1304069 -0.0260625)
      PathPoint P2: tibia_l (0.02729008 -0.3783784 -0.006798913)
      PathPoint P3: calcn_l (0.07545924 0.03175508 8.184299e-5)
      PathPoint P4: calcn_l (0.1322583 0.004501364 -0.01063959)
      PathPoint P5: toes_l (0.000245529 0.00384662 -0.01252198)
      PathPoint P6: toes_l (0.03625644 -0.000327372 -0.02046075)
    Thelen2003Muscle ext_hal_l: max_isometric_force=162 optimal_fiber_length=0.0985111 tendon_slack_length=0.2706837
        pennation_angle_at_optimal=0.1047198
      PathPoint P1: tibia_l (0.001133152 -0.1668566 -0.02152989)
      PathPoint P2: tibia_l (0.03078397 -0.3763009 0.008026494)
      PathPoint P3: calcn_l (0.0793877 0.03183692 0.01726887)
      PathPoint P4: calcn_l (0.105823 0.02528948 0.02103365)
      PathPoint P5: calcn_l (0.1419157 0.01137618 0.02291604)
      PathPoint P6: toes_l (0.02438921 0.003355563 0.02005153)
      PathPoint P7: toes_l (0.0460776 0.002782662 0.0152228)
    Thelen2003Muscle ercspn_r: max_isometric_force=2500 optimal_fiber_length=0.1158518 tendon_slack_length=0.02896295
        pennation_angle_at_optimal=0
      PathPoint P1: pelvis (-0.137363 0.04307312 0.04277877)
      PathPoint P2: torso (-0.05279522 0.1055904 0.02313391)
    Thelen2003Muscle ercspn_l: max_isometric_force=2500 optimal_fiber_length=0.1158518 tendon_slack_length=0.02896295
        pennation_angle_at_optimal=0
      PathPoint P1: pelvis (-0.137363 0.04307312 -0.04277877)
      PathPoint P2: torso (-0.05279522 0.1055904 -0.02313391)
    Thelen2003Muscle intobl_r: max_isometric_force=900 optimal_fiber_length=0.09669901 tendon_slack_length=0.09669901
        pennation_angle_at_optimal=0
      PathPoint P1: pelvis (-0.03924657 0.06868151 0.1135207)
      PathPoint P2: torso (0.06719392 0.1535861 0.0143987)
    Thelen2003Muscle intobl_l: max_isometric_force=900 optimal_fiber_length=0.09669901 tendon_slack_length=0.09669901
        pennation_angle_at_optimal=0
      PathPoint P1: pelvis (-0.03924657 0.06868151 -0.1135207)
      PathPoint P2: torso (0.06719392 0.1535861 -0.0143987)
    Thelen2003Muscle extobl_r: max_isometric_force=900 optimal_fiber_length=0.1164292 tendon_slack_length=0.1358341
        pennation_angle_at_optimal=0
      PathPoint P1: pelvis (-0.02943493 -0.06240205 0.009811644)
      PathPoint P2: torso (0.06239435 0.1055904 0.1055904)
    Thelen2003Muscle extobl_l: max_isometric_force=900 optimal_fiber_length=0.1164292 tendon_slack_length=0.1358341
        pennation_angle_at_optimal=0
      PathPoint P1: pelvis (-0.02943493 -0.06240205 -0.009811644)
      PathPoint P2: torso (0.06239435 0.1055904 -0.1055904)
    CoordinateActuator lumbar_ext: coordinate=lumbar_extension optimal_force=10
    CoordinateActuator lumbar_bend: coordinate=lumbar_bending optimal_force=10
    CoordinateActuator lumbar_rot: coordinate=lumbar_rotation optimal_force=10
    CoordinateActuator shoulder_flex_r: coordinate=arm_flex_r optimal_force=10
    CoordinateActuator shoulder_add_r: coordinate=arm_add_r optimal_force=10
    CoordinateActuator shoulder_rot_r: coordinate=arm_rot_r optimal_force=10
    CoordinateActuator elbow_flex_r: coordinate=elbow_flex_r optimal_force=10
    CoordinateActuator pro_sup_r: coordinate=pro_sup_r optimal_force=10
    CoordinateActuator wrist_flex_r: coordinate=wrist_flex_r optimal_force=10
    CoordinateActuator wrist_dev_r: coordinate=wrist_dev_r optimal_force=10
    CoordinateActuator shoulder_flex_l: coordinate=arm_flex_l optimal_force=10
    CoordinateActuator shoulder_add_l: coordinate=arm_add_l optimal_force=10
    CoordinateActuator shoulder_rot_l: coordinate=arm_rot_l optimal_force=10
    CoordinateActuator elbow_flex_l: coordinate=elbow_flex_l optimal_force=10
    CoordinateActuator pro_sup_l: coordinate=pro_sup_l optimal_force=10
    CoordinateActuator wrist_flex_l: coordinate=wrist_flex_l optimal_force=10
    CoordinateActuator wrist_dev_l: coordinate=wrist_dev_l optimal_force=10
    ObjectGroup R_hip_abd: members=(glut_max1_r glut_med1_r glut_med2_r glut_med3_r glut_min1_r glut_min2_r glut_min3_r peri_r sar_r tfl_r)
    ObjectGroup R_hip_flex: members=(add_brev_r add_long_r glut_med1_r glut_min1_r grac_r iliacus_r pect_r psoas_r rect_fem_r sar_r tfl_r)
    ObjectGroup R_hip_inrot: members=(glut_med1_r glut_min1_r iliacus_r psoas_r tfl_r)
    ObjectGroup R_hip_exrot: members=(gem_r glut_med3_r glut_min3_r peri_r quad_fem_r)
    ObjectGroup R_hip_ext: members=(add_long_r add_mag1_r add_mag2_r add_mag3_r bifemlh_r glut_max1_r glut_max2_r glut_max3_r glut_med3_r glut_min3_r semimem_r semiten_r)
    ObjectGroup R_hip_add: members=(add_brev_r add_long_r add_mag1_r add_mag2_r add_mag3_r bifemlh_r grac_r pect_r semimem_r semiten_r)
    ObjectGroup R_knee_bend: members=(bifemlh_r bifemsh_r grac_r lat_gas_r med_gas_r sar_r semimem_r semiten_r)
    ObjectGroup R_knee_ext: members=(rect_fem_r vas_int_r vas_lat_r vas_med_r)
    ObjectGroup R_ankle_pf: members=(flex_dig_r flex_hal_r lat_gas_r med_gas_r per_brev_r per_long_r soleus_r tib_post_r)
    ObjectGroup R_inverter: members=(ext_hal_r flex_dig_r flex_hal_r tib_ant_r tib_post_r)
    ObjectGroup R_ankle_df: members=(ext_dig_r ext_hal_r per_tert_r tib_ant_r)
    ObjectGroup R_everter: members=(ext_dig_r per_brev_r per_long_r per_tert_r)
    ObjectGroup L_hip_abd: members=(glut_max1_l glut_med1_l glut_med2_l glut_med3_l glut_min1_l glut_min2_l glut_min3_l peri_l sar_l tfl_l)
    ObjectGroup L_hip_flex: members=(add_brev_l add_long_l glut_med1_l glut_min1_l grac_l iliacus_l pect_l psoas_l rect_fem_l sar_l tfl_l)
    ObjectGroup L_hip_inrot: members=(glut_med1_l glut_min1_l iliacus_l psoas_l tfl_l)
    ObjectGroup L_hip_exrot: members=(gem_l glut_med3_l glut_min3_l peri_l quad_fem_l)
    ObjectGroup L_hip_ext: members=(add_long_l add_mag1_l add_mag2_l add_mag3_l bifemlh_l glut_max1_l glut_max2_l glut_max3_l glut_med3_l glut_min3_l semimem_l semiten_l)
    ObjectGroup L_hip_add: members=(add_brev_l add_long_l add_mag1_l add_mag2_l add_mag3_l bifemlh_l grac_l pect_l semimem_l semiten_l)
    ObjectGroup L_knee_bend: members=(bifemlh_l bifemsh_l grac_l lat_gas_l med_gas_l sar_l semimem_l semiten_l)
    ObjectGroup L_knee_ext: members=(rect_fem_l vas_int_l vas_lat_l vas_med_l)
    ObjectGroup L_ankle_pf: members=(flex_dig_l flex_hal_l lat_gas_l med_gas_l per_brev_l per_long_l soleus_l tib_post_l)
    ObjectGroup L_inverter: members=(ext_hal_l flex_dig_l flex_hal_l tib_ant_l tib_post_l)
    ObjectGroup L_ankle_df: members=(ext_dig_l ext_hal_l per_tert_l tib_ant_l)
    ObjectGroup L_everter: members=(ext_dig_l per_brev_l per_long_l per_tert_l)
    ObjectGroup back_ext: members=(ercspn_l ercspn_r)
    ObjectGroup back_rlb: members=(ercspn_r extobl_r intobl_r)
    ObjectGroup back_introt: members=(ercspn_r extobl_l intobl_r)
    ObjectGroup back_llb: members=(ercspn_l extobl_l intobl_l)
    ObjectGroup back_extrot: members=(ercspn_l extobl_r intobl_l)
    ObjectGroup back_flex: members=(extobl_l extobl_r intobl_l intobl_r)
  MarkerSet:
    Marker C7: torso (-0.06719392 0.4180817 0) fixed=true
    Marker T10: torso (-0.09599131 0.2111809 0) fixed=true
    Marker CLAV: torso (0.03839652 0.3551678 0) fixed=true
    Marker STRN: torso (0.09599131 0.2015817 0) fixed=true
    Marker RSHO: torso (0.01342072 0.3957971 0.1547056) fixed=true
    Marker RUPA: humerus_r (0.01449519 -0.1202107 0.02821958)
    Marker RELB: humerus_r (0.01460518 -0.260885 0.03998168) fixed=true
    Marker RWRA: hand_r (0.007779545 0.002370498 0.03002187) fixed=true
    Marker RWRB: hand_r (-0.01166416 0.0005981114 -0.03168042) fixed=true
    Marker RFIN: hand_r (-0.01869688 -0.07692248 0.0009123485) fixed=true
    Marker LSHO: torso (0.01342072 0.3957971 -0.1547056) fixed=true
    Marker LUPA: humerus_l (0.01449519 -0.1202107 -0.02821958)
    Marker LELB: humerus_l (0.01460518 -0.260885 -0.03998168) fixed=true
    Marker LWRA: hand_l (0.007779545 0.002370498 -0.03002187) fixed=true
    Marker LWRB: hand_l (-0.01166416 0.0005981114 0.03168042) fixed=true
    Marker LFIN: hand_l (-0.01869688 -0.07692248 -0.0009123485) fixed=true
    Marker RASI: pelvis (0.008339606 0.006777035 0.125589) fixed=true
    Marker LASI: pelvis (0.008339606 0.006777035 -0.125589) fixed=true
    Marker RPSI: pelvis (-0.1510467 0.03415914 0.04622894) fixed=true
    Marker LPSI: pelvis (-0.1510467 0.03415914 -0.04622894) fixed=true
    Marker RTHI: femur_r (0.01940404 -0.1651408 0.05277942)
    Marker RKNE: femur_r (0.01619735 -0.3775331 0.04666329) fixed=true
    Marker RTIB: tibia_r (0.00107623 -0.202383 0.0385121)
    Marker RANK: tibia_r (-0.01217914 -0.3604884 0.04372119) fixed=true
    Marker RHEE: calcn_r (-0.0153993 0.0163686 -0.003747916) fixed=true
    Marker RTOE: toes_r (0.03039736 0.0100043 0.003187653) fixed=true
    Marker LTHI: femur_l (0.01940404 -0.1651408 -0.05277942)
    Marker LKNE: femur_l (0.01619735 -0.3775331 -0.04666329) fixed=true
    Marker LTIB: tibia_l (0.00107623 -0.202383 -0.0385121)
    Marker LANK: tibia_l (-0.01217914 -0.3604884 -0.04372119) fixed=true
    Marker LHEE: calcn_l (-0.0153993 0.0163686 0.003747916) fixed=true
    Marker LTOE: toes_l (0.03039736 0.0100043 -0.003187653) fixed=true
    Marker LFHD: torso (0.07285788 0.6037456 -0.03924984) fixed=true
    Marker RFHD: torso (0.0728579 0.603746 0.0392498) fixed=true
    Marker LBHD: torso (-0.0766996 0.5356168 -0.04648456) fixed=true
    Marker RBHD: torso (-0.0766996 0.5356168 0.04648456) fixed=true
