# OpenSim document version 40000
InverseKinematicsTool:
  time_range: 0.2 3.5
  marker_file: S001\MotionCapture\LevelWalking\TRC\trial01.trc
  IKTaskSet:
    IKMarkerTask RFHD: apply=true weight=1
    IKMarkerTask LFHD: apply=true weight=1
    IKMarkerTask RBHD: apply=true weight=1
    IKMarkerTask LBHD: apply=true weight=1
    IKMarkerTask C7: apply=true weight=1
    IKMarkerTask T10: apply=true weight=1
    IKMarkerTask CLAV: apply=true weight=1
    IKMarkerTask STRN: apply=true weight=1
    IKMarkerTask RBAK: apply=true weight=1
    IKMarkerTask LSHO: apply=true weight=1
    IKMarkerTask RSHO: apply=true weight=1
    IKMarkerTask LUPA: apply=true weight=0.2
    IKMarkerTask RUPA: apply=true weight=0.2
    IKMarkerTask LELB: apply=true weight=1
    IKMarkerTask RELB: apply=true weight=1
    IKMarkerTask LFRM: apply=true weight=0.2
    IKMarkerTask RFRM: apply=true weight=0.2
    IKMarkerTask LWRA: apply=true weight=1
    IKMarkerTask RWRA: apply=true weight=1
    IKMarkerTask LWRB: apply=true weight=1
    IKMarkerTask RWRB: apply=true weight=1
    IKMarkerTask LFIN: apply=true weight=1
    IKMarkerTask RFIN: apply=true weight=1
    IKMarkerTask LASI: apply=true weight=10
    IKMarkerTask RASI: apply=true weight=10
    IKMarkerTask LPSI: apply=true weight=10
    IKMarkerTask RPSI: apply=true weight=10
    IKMarkerTask LTHI: apply=true weight=0.2
    IKMarkerTask RTHI: apply=true weight=0.2
    IKMarkerTask LKNE: apply=true weight=1
    IKMarkerTask RKNE: apply=true weight=1
    IKMarkerTask LTIB: apply=true weight=0.2
    IKMarkerTask LANK: apply=true weight=1
    IKMarkerTask RANK: apply=true weight=1
    IKMarkerTask RTIB: apply=true weight=0.2
    IKMarkerTask LHEE: apply=true weight=1
    IKMarkerTask RHEE: apply=true weight=1
    IKMarkerTask LTOE: apply=true weight=1
    IKMarkerTask RTOE: apply=true weight=1
