# OpenSim document version 40000
ScaleTool Scaled_model:
  mass: 48.2 [kg]
  height: 1636
  age: -1
  ModelScaler:
    apply: true
    scaling_order: measurements
    marker_file: \S001\MotionCapture\Static\TRC\trial01.trc
    time_range: 1 3
    preserve_mass_distribution: false
    output_model_file: Gait120_S001_Scaled.osim
    MeasurementSet:
      Measurement pelvis: apply=true
        MarkerPair: markers=(RASI LASI)
        MarkerPair: markers=(RASI RPSI)
        MarkerPair: markers=(LASI LPSI)
        BodyScale pelvis: axes=(X Y Z)
      Measurement thigh: apply=true
        MarkerPair: markers=(RASI RKNE)
        MarkerPair: markers=(RPSI RKNE)
        MarkerPair: markers=(LASI LKNE)
        MarkerPair: markers=(LPSI LKNE)
        BodyScale femur_r: axes=(X Y Z)
        BodyScale femur_l: axes=(X Y Z)
      Measurement shank: apply=true
        MarkerPair: markers=(RKNE RANK)
        MarkerPair: markers=(LKNE LANK)
        BodyScale tibia_r: axes=(X Y Z)
        BodyScale patella_r: axes=(X Y Z)
        BodyScale tibia_l: axes=(X Y Z)
        BodyScale patella_l: axes=(X Y Z)
      Measurement foot: apply=true
        MarkerPair: markers=(RTOE RHEE)
        MarkerPair: markers=(LTOE LHEE)
        BodyScale talus_r: axes=(X Y Z)
        BodyScale calcn_r: axes=(X Y Z)
        BodyScale toes_r: axes=(X Y Z)
        BodyScale talus_l: axes=(X Y Z)
        BodyScale calcn_l: axes=(X Y Z)
        BodyScale toes_l: axes=(X Y Z)
      Measurement torso: apply=true
        MarkerPair: markers=(RSHO LSHO)
        MarkerPair: markers=(RSHO RASI)
        MarkerPair: markers=(LSHO LASI)
        BodyScale torso: axes=(X Y Z)
      Measurement uarm: apply=true
        MarkerPair: markers=(RSHO RELB)
        MarkerPair: markers=(LSHO LELB)
        BodyScale humerus_r: axes=(X Y Z)
        BodyScale humerus_l: axes=(X Y Z)
      Measurement farm: apply=true
        MarkerPair: markers=(RELB RFIN)
        MarkerPair: markers=(LELB LFIN)
        BodyScale ulna_r: axes=(X Y Z)
        BodyScale radius_r: axes=(X Y Z)
        BodyScale hand_r: axes=(X Y Z)
        BodyScale ulna_l: axes=(X Y Z)
        BodyScale radius_l: axes=(X Y Z)
        BodyScale hand_l: axes=(X Y Z)
  MarkerPlacer:
    apply: false
    time_range: 0 2
    max_marker_movement: -1
    IKTaskSet:
      IKMarkerTask LUPA: apply=false weight=0.2
      IKMarkerTask RUPA: apply=false weight=0.2
      IKMarkerTask LFRM: apply=false weight=0.2
      IKMarkerTask RFRM: apply=false weight=0.2
      IKMarkerTask LASI: apply=false weight=10
      IKMarkerTask RASI: apply=false weight=10
      IKMarkerTask LPSI: apply=false weight=10
      IKMarkerTask RPSI: apply=false weight=10
      IKMarkerTask LTHI: apply=false weight=0.2
      IKMarkerTask RTHI: apply=false weight=0.2
      IKMarkerTask LTIB: apply=false weight=0.2
      IKMarkerTask RTIB: apply=false weight=0.2
